dx := 2
φ := 90
φ_rad := φ*π/180 = 1.5708
dy := 3
dx_cs := 6
dy_cs := 6
T1(dx, dy) := [1, 0, -dx; 0, 1, -dy; 0, 0, 1]
T2(φ) := [cos(φ), sin(φ), 0; -sin(φ), cos(φ), 0; 0, 0, 1]
Ma := transpose([6, 6, 1]) = [6; 6; 1]
Mb := transpose([6, 8, 1]) = [6; 8; 1]
Mc := transpose([8, 6, 1]) = [8; 6; 1]
P := [6, 6, 8; 6, 8, 6; 1, 1, 1]
P := T1(dx_cs, dy_cs)*P = [0, 0, 2; 0, 2, 0; 1, 1, 1]  # смещаем систему координат в точку Ma
P := T2(φ_rad)*P = [0, 2, 0; 0, 0, -2; 1, 1, 1]  # поворачиваем треуголиник на угол 90 град. по часовой стрелке
P := T1(-dx, -dy)*P = [2, 4, 2; 3, 3, 1; 1, 1, 1]  # смещаем треугольник на (dx, dy)
P := T1(-dx_cs, -dy_cs)*P = [8, 10, 8; 9, 9, 7; 1, 1, 1]  # смещаем СК в исходное положение
