to_rad(α) := α*π/180
dx := 2
dy := 3
dz := 5  # - смещения
φ := to_rad(90) = 1.5708  # - угол поворота вокруг оси x
Ma := transpose([6, 6, 4, 1]) = [6; 6; 4; 1]
Mb := transpose([2, 4, 5, 1]) = [2; 4; 5; 1]
Mc := transpose([3, 4, 7, 1]) = [3; 4; 7; 1]
P := [6, 2, 3; 6, 4, 4; 4, 5, 7; 1, 1, 1]
ψ := to_rad(45) = 0.785398  # - угол поворота вокруг оси y
Td(dx, dy, dz) := [1, 0, 0, -dx; 0, 1, 0, -dy; 0, 0, 1, -dz; 0, 0, 0, 1]  # - сдвиг осей координат на dx, dy, dz
P := Td(Ma[0, 0], Ma[1, 0], Ma[2, 0])*P = [0, -4, -3; 0, -2, -2; 0, 1, 3; 1, 1, 1]  # смещаемся в точку Ma
# Поворот оси x на угол φ: | Поворот оси y на угол ψ: | Поворот оси z на угол γ:
Tx(φ) := [1, 0, 0, 0; 0, cos(φ), sin(φ), 0; 0, -sin(φ), cos(φ), 0; 0, 0, 0, 1]
Ty(ψ) := [cos(ψ), 0, sin(ψ), 0; 0, 1, 0, 0; -sin(ψ), 0, cos(ψ), 0; 0, 0, 0, 1]
Tz(γ) := [cos(γ), sin(γ), 0, 0; -sin(γ), cos(γ), 0, 0; 0, 0, 1, 0; 0, 0, 0, 1]
P := Tx(φ)*Ty(ψ)*P = [0, -2.12132, 0; 0, 3.53553, 4.24264; 0, 2, 2; 1, 1, 1]
# осуществляем поворот фигуры(!) по часовой стрелке,
# что эквивалентно повороту СК против часовой стрелки
# Положительное направление - против часовой стрелки.
P := Td(-Ma[0, 0], -Ma[1, 0], -Ma[2, 0])*P = [6, 3.87868, 6; 6, 9.53553, 10.2426; 4, 6, 6; 1, 1, 1]
# смещаем систему координат в исходное
# положение
Tk(kx, ky, kz) := [1/kx, 0, 0, 0; 0, 1/ky, 0, 0; 0, 0, 1/kz, 0; 0, 0, 0, 1]  # - растяжение-сжатие на kx, ky, kz
P := T1(dx_cs, dy_cs)*P  # error: Эта переменная не определена.  # смещаем систему координат в точку Ma
P := T2(φ_rad)*P  # error: Эта переменная не определена.  # поворачиваем треуголиник на угол 90 град. по часовой стрелке
P := T1(-dx, -dy)*P  # error: Эта переменная не определена.  # смещаем треугольник на (dx, dy)
P := T1(-dx_cs, -dy_cs)*P  # error: Эта переменная не определена.  # смещаем СК в исходное положение
