X[4] := -1
X[0] := -1
X[1] := -1
X[2] := 1
X[3] := 1
move(dx, dy) := [1, 0, -dx; 0, 1, -dy; 0, 0, 1]
Y[2] := 1
Y[3] := -1
Y[4] := -1
Y[0] := -1
Y[1] := 1
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rotateM(fi) := [cos(fi), sin(fi), 0; -sin(fi), cos(fi), 0; 0, 0, 1]
P := [X[0], X[1], X[2], X[3]; Y[0], Y[1], Y[2], Y[3]; 1, 1, 1, 1]
fi := 45
fi_rad := (fi*π)/180
d := 10
dx := cos(45*π/180)*d
P = [-1, -1, 1, 1; -1, 1, 1, -1; 1, 1, 1, 1]
dy := sin(45*π/180)*d
dx = 7.07107
dy = 7.07107
# Поворачиваем СК на 45 град по часовой стрелке.
P1 := rotateM(-fi_rad)*P
P1 = [0, -1.41421, 0, 1.41421; -1.41421, 0, 1.41421, 0; 1, 1, 1, 1]
# Смещаем CК по биссектриссе на 10 ед.
P2 := move(-dx, -dy)*P1
P2 = [7.07107, 5.65685, 7.07107, 8.48528; 5.65685, 7.07107, 8.48528, 7.07107; 1, 1, 1, 1]
V[1] := P2[0, 1]
V[3] := P2[0, 3]
V[0] := P2[0, 0]
V[2] := P2[0, 2]
V[4] := P2[0, 0]
U[0] := P2[1, 0]
U[1] := P2[1, 1]
U[2] := P2[1, 2]
U[3] := P2[1, 3]
U[4] := P2[1, 0]
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