X[0] := 6
X[1] := 8
move(dx, dy) := [1, 0, -dx; 0, 1, -dy; 0, 0, 1]
Y[1] := 6
Y[0] := 8
MY := (Y[0] + Y[1])/2
MX := (X[0] + X[1])/2
rotateM(fi) := [cos(fi), sin(fi), 0; -sin(fi), cos(fi), 0; 0, 0, 1]
MX = 7
MY = 7
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P := [X[0], X[1]; Y[0], Y[1]; 1, 1]
P = [6, 8; 8, 6; 1, 1]
fi1 := 45
fi2 := 60
fi_rad1 := (fi1*π)/180
fi_rad2 := (fi2*π)/180
# Смещаем отрезок. Точку М делаем началом СК
P1 := move(MX, MY)*P
P1 = [-1, 1; 1, -1; 1, 1]
# Вращаем отрезок на 45 против часовой. Т.е вращаем СК на 45 по часовой
P2 := rotateM(-fi_rad1)*P1
P2 = [-1.41421, 1.41421; 0, 0; 1, 1]
# Возвращаем отрезок на место
P3 := move(-MX, -MY)*P2
P3 = [5.58579, 8.41421; 7, 7; 1, 1]
# Вращаем относительно О на 60 по часовой т. е вращаем СК на 60 против часовой
P4 := rotateM(fi_rad2)*P3
P4 = [8.85507, 10.2693; -1.33743, -3.78692; 1, 1]
V[1] := P4[0, 1]
V[0] := P4[0, 0]
V[2] := P4[0, 0]
U[0] := P4[1, 0]
U[1] := P4[1, 1]
U[2] := P4[1, 0]
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