T(dx, dy) := [1, 0, -dx; 0, 1, -dy; 0, 0, 1]
R(fi) := [cos(fi), sin(fi), 0; -sin(fi), cos(fi), 0; 0, 0, 1]
X[0] := -6
X[1] := -4
X[2] := X[0]
Y[0] := 1
Y[1] := 2
Y[2] := Y[0]
dx1 := 2
dy1 := 3
dx2 := 3
dy2 := 4
p := [X[0], X[1]; Y[0], Y[1]; 1, 1]
p = [-6, -4; 1, 2; 1, 1]
p1 := T(-dx1, -dy1)*p = [-4, -2; 4, 5; 1, 1]
p2 := T(-dx2, -dy2)*p1 = [-1, 1; 8, 9; 1, 1]
V[0] := p2[0, 0]
V[1] := p2[0, 1]
V[2] := V[0]
U[0] := p2[1, 0]
U[1] := p2[1, 1]
U[2] := U[0]
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