X[0] := 1
X[1] := 10
X[2] := X[0]
Y[0] := 2
Y[1] := 8
Y[2] := Y[0]
V[0] := 5
V[1] := 8
V[2] := V[0]
U[0] := 7
U[1] := 2
U[2] := U[0]
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A := [X[0]; Y[0]]
B := transpose([X[1], Y[1]])
C := transpose([V[0], U[0]])
D := transpose([V[1], U[1]])
(10 - 1)*t - (8 - 5)*s == 5 - 1
(8 - 2)*t - (2 - 7)*s == 7 - 2
ORIGIN := 1
t := 1
s := 1
Given
(B - A)*t - (D - C)*s == C - A
Find(t, s) → [5/9; 1/3]
C = [5; 7]
A = [1; 2]
D = [8; 2]
B = [10; 8]
I := C + (D - C)*(1/3) = [6; 5.33333]
Q := A + (B - A)*(5/9) = [6; 5.33333]
