x[1] := 2
x[2] := 0
x[3] := 0
y[1] := 0
y[2] := -10
y[3] := 0
z[1] := 0
z[2] := 0
z[3] := 2
θ_grad := 90
θ := θ_grad*π/180
M := [x[1], x[2], x[3]; y[1], y[2], y[3]; z[1], z[2], z[3]; 1, 1, 1] = [2, 0, 0; 0, -10, 0; 0, 0, 2; 1, 1, 1]
[dx; dy; dz; q] := M[:, 0]
x1 := M[0, 0]
z3 := M[2, 2]
T1(Δx, Δy, Δz) := [1, 0, 0, -Δx; 0, 1, 0, -Δy; 0, 0, 1, -Δz; 0, 0, 0, 1]
Ry(φ) := [cos(φ), 0, -sin(φ), 0; 0, 1, 0, 0; sin(φ), 0, cos(φ), 0; 0, 0, 0, 1]
Rz(φ) := [cos(φ), -sin(φ), 0, 0; sin(φ), cos(φ), 0, 0; 0, 0, 1, 0; 0, 0, 0, 1]
α := atan(x1/z3)
α_grad := α*180/π = 45
M1 := T1(-dx, -dy, -dz)*Ry(α)*Rz(θ)*Ry(-α)*T1(dx, dy, dz)*M = [2, 8.07107, 0; 0, -1.41421, 0; 0, 8.07107, 2; 1, 1, 1]
