x[1] := 5
x[2] := 0
x[3] := 0
y[1] := 0
y[2] := -4
y[3] := 0
z[1] := 0
z[2] := 0
z[3] := 8
M := [x[1], x[2], x[3]; y[1], y[2], y[3]; z[1], z[2], z[3]; 1, 1, 1] = [5, 0, 0; 0, -4, 0; 0, 0, 8; 1, 1, 1]
Rsz(fi) := [cos(fi), sin(fi), 0, 0; -sin(fi), cos(fi), 0, 0; 0, 0, 1, 0; 0, 0, 0, 1]
fi := 45
fi_rad := fi*π/180
fi2 := 30
fi2_rad := fi2*π/180
Ts(dx, dy, dz) := [1, 0, 0, -dx; 0, 1, 0, -dy; 0, 0, 1, -dz; 0, 0, 0, 1]
M1 := Rsz(fi_rad)*M = [3.53553, -2.82843, 0; -3.53553, -2.82843, 0; 0, 0, 8; 1, 1, 1]
Rsy(fi) := [cos(fi), 0, -sin(fi), 0; 0, 1, 0, 0; sin(fi), 0, cos(fi), 0; 0, 0, 0, 1]
M2 := Ts(0, 0, 10)*M1 = [3.53553, -2.82843, 0; -3.53553, -2.82843, 0; -10, -10, -2; 1, 1, 1]
M3 := Rsy(-fi2_rad)*M2 = [-1.93814, -7.44949, -1; -3.53553, -2.82843, 0; -10.428, -7.24604, -1.73205; 1, 1, 1]
