x[0] := 1
x[1] := -1
x[2] := -1
x[3] := 1
y[0] := -1
y[1] := -1
y[2] := 1
y[3] := 1
z[0] := 0
z[1] := 0
z[2] := 0
z[3] := 0
A := transpose([x[0], y[0], z[0]]) = [1; -1; 0]
B := transpose([x[1], y[1], z[1]]) = [-1; -1; 0]
C := transpose([x[2], y[2], z[2]]) = [-1; 1; 0]
D := transpose([x[3], y[3], z[3]]) = [1; 1; 0]
E := [0; 0; 5]
r := 1
fi_g := 30
te_g := 45
te := te_g*π/180
fi := fi_g*π/180
AD := D - A = [0; 2; 0]
AE := E - A = [-1; 1; 5]
DC := C - D = [-2; 0; 0]
DE := E - D = [-1; -1; 5]
N2 := AD×AE = [10; 0; 2]
N4 := DC×DE = [0; 10; 2]
Xr := r*sin(te)*cos(fi) = 0.612372
Yr := r*sin(fi)*sin(te) = 0.353553
Zr := r*cos(te) = 0.707107
R := [Xr; Yr; Zr] = [0.612372; 0.353553; 0.707107]
cos_a2 := R*N2/(|R|*|N2|) = 0.739156
acos(cos_a2*π/180) = 1.5579
cos_a4 := R*N4/(|R|*|N4|) = 0.485363
