X[0] := 2
X[1] := 10
X[2] := X[0]
Y[0] := 1
Y[1] := 5
Y[2] := Y[0]
V[0] := 3
V[1] := 8
V[2] := V[0]
U[0] := 7
U[1] := 1
U[2] := U[0]
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A := [X[0]; Y[0]]
B := transpose([X[1], Y[1]])
C := transpose([V[0], U[0]])
D := transpose([V[1], U[1]])
ORIGIN := 1
t := 1
s := 1
Given
(10 - 2)*t - (8 - 3)*s == 3 - 2
(5 - 1)*t - (1 - 7)*s == 7 - 1
Find(t, s) → [9/17; 11/17]
C = [3; 7]
A = [2; 1]
D = [8; 1]
B = [10; 5]
I := C + (D - C)*(11/17) = [6.23529; 3.11765]
Q := A + (B - A)*(9/17) = [6.23529; 3.11765]
