T(dx, dy) := [1, 0, -dx; 0, 1, -dy; 0, 0, 1]
R(φ) := [cos(φ), sin(φ), 0; -sin(φ), cos(φ), 0; 0, 0, 1]
X[0] := 6
X[1] := 8
X[2] := X[0]
Y[0] := 8
Y[1] := 6
Y[2] := Y[0]
dx1 := 7
dy1 := 7
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φ1 := 45
φ2 := 60
φ2_rad := φ2*π/180
φ1_rad := φ1*π/180
dx2 := 0
dy2 := 0
p := [X[0], X[1]; Y[0], Y[1]; 1, 1]
p1 := T(dx1, dy1)*p
p1 = [-1, 1; 1, -1; 1, 1]
p2 := R(-φ1_rad)*p1
p2 = [-1.41421, 1.41421; 0, 0; 1, 1]
p3 := T(-dx1, -dy1)*p2
p3 = [5.58579, 8.41421; 7, 7; 1, 1]
V[0] := p3[0, 0]
V[1] := p3[0, 1]
V[2] := V[0]
U[0] := p3[1, 0]
U[1] := p3[1, 1]
U[2] := U[0]
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p4 := T(dx2, dy2)*p3
p4 = [5.58579, 8.41421; 7, 7; 1, 1]
p5 := R(φ2_rad)*p4
p5 = [8.85507, 10.2693; -1.33743, -3.78692; 1, 1]
p6 := T(-dx2, -dy2)*p5
p6 = [8.85507, 10.2693; -1.33743, -3.78692; 1, 1]
A[0] := p6[0, 0]
A[1] := p6[0, 1]
A[2] := A[0]
B[0] := p6[1, 0]
B[0] := p6[1, 1]
B[2] := B[0]
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