R(f) := [cos(f), sin(f), 0; -sin(f), cos(f), 0; 0, 0, 1]
T(dx, dy) := [1, 0, -dx; 0, 1, -dy; 0, 0, 1]
X[0] := -7
X[1] := -7
X[2] := 5
X[3] := X[0]
Y[0] := 5
Y[1] := 7
Y[2] := 7
Y[3] := Y[0]
fi := 45
dx1 := -7
dx2 := 3
p := [X[0], X[1], X[2]; Y[0], Y[1], Y[2]; 1, 1, 1]
dy1 := 7
dy2 := -2
fi_rad := fi*π/180
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p1 := T(dx1, dy1)*p
p1 = [0, 0, 12; -2, 0, 0; 1, 1, 1]
p2 := R(fi_rad)*p1
p2 = [-1.41421, 0, 8.48528; -1.41421, 0, -8.48528; 1, 1, 1]
p3 := T(-dx2, -dy2)*p2
p3 = [1.58579, 3, 11.4853; -3.41421, -2, -10.4853; 1, 1, 1]
p4 := T(-dx1, -dy1)*p3
p4 = [-5.41421, -4, 4.48528; 3.58579, 5, -3.48528; 1, 1, 1]
V[0] := p4[0, 0]
V[1] := p4[0, 1]
V[2] := p4[0, 2]
V[3] := V[0]
U[1] := p4[1, 1]
U[0] := p4[1, 0]
U[2] := p4[1, 2]
U[3] := U[0]
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