T(dx, dy) := [1, 0, -dx; 0, 1, -dy; 0, 0, 1]
R(fi) := [cos(fi), sin(fi), 0; -sin(fi), cos(fi), 0; 0, 0, 1]
X[0] := -6
X[1] := -4
X[2] := X[0]
Y[0] := 5
Y[1] := 5
Y[2] := Y[0]
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dx1 := 5
dy1 := 5
p := [X[0], X[1]; Y[0], Y[1]; 1, 1]
fi := 90
fi_rad := fi*π/180
fi2 := 45
fi2_rad := fi2*π/180
p2 := R(fi_rad)*p
p2 = [5, 5; 6, 4; 1, 1]
p3 := T(dx1, dy1)*p2
p4 := R(-fi2_rad)*p3
p4 = [-0.707107, 0.707107; 0.707107, -0.707107; 1, 1]
p5 := T(-dx1, -dy1)*p4
p5 = [4.29289, 5.70711; 5.70711, 4.29289; 1, 1]
V[0] := p5[0, 0]
V[1] := p5[0, 1]
V[2] := V[0]
U[0] := p5[1, 0]
U[1] := p5[1, 1]
U[2] := U[0]
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