T(dx, dy) := [1, 0, -dx; 0, 1, -dy; 0, 0, 1]
R(fi) := [cos(fi), sin(fi), 0; -sin(fi), cos(fi), 0; 0, 0, 1]
X[0] := 4
X[1] := 6
X[2] := 6
X[3] := X[0]
Y[0] := 2
Y[1] := 4
Y[2] := 2
Y[3] := Y[0]
dx1 := X[1]
dy1 := Y[1]
fi1 := 45
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fi1_rad := fi1*π/180
dx2 := 1
dy2 := 2
p := [X[0], X[1], X[2]; Y[0], Y[1], Y[2]; 1, 1, 1]
p = [4, 6, 6; 2, 4, 2; 1, 1, 1]
p1 := T(dx1, dy1)*p
p1 = [-2, 0, 0; -2, 0, -2; 1, 1, 1]
p2 := R(-fi1_rad)*p1
p2 = [0, 0, 1.41421; -2.82843, 0, -1.41421; 1, 1, 1]
p3 := T(-dx2, -dy2)*p2
p3 = [1, 1, 2.41421; -0.828427, 2, 0.585786; 1, 1, 1]
p4 := T(-dx1, -dy1)*p3 = [7, 7, 8.41421; 3.17157, 6, 4.58579; 1, 1, 1]
V[0] := p4[0, 0]
V[1] := p4[0, 1]
V[2] := p4[0, 2]
V[3] := V[0]
U[0] := p4[1, 0]
U[1] := p4[1, 1]
U[2] := p4[1, 2]
U[3] := U[0]
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