x := 2
n := 12
y := (sqrt(x^3 + n) + cos(|n*x - 1|))/nthroot(x^5 + 8*x + n, 4) = 1.41541
y = 1.41541
y := (sum(sin(i/n), i = 1 .. 10) + sum((i - n)/(i + n), i = 1 .. 5))/(sum((i^2 + 2)/cos(n + i), i = 1 .. 5)*product((n + 3i)/(n^2*n*i - n), i = 1 .. 5)) = -3.10365e10 + 8.61187e10i
a := -π/2
b := π/2
I := integral((x - 1)*sin(n*x - 2)*nthroot(x^2 - n*x + 1, 3), x = a .. b) = 0.299193
x := -2, -1.6 .. 2
f(x) := (x^2 - x*n - cos(x))*sqrt(|x - sin(n*x)|)
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x = [-2; -1.6; -1.2; -0.8; -0.4; 0; 0.4; 0.8; 1.2; 1.6; 2]
A := READPRN("MatrA.txt")
i := 0 .. 2
a := -2*n
b := 2*n
j := 0 .. 2
D[i, j] := runif(1, a, b)
A = [1, 2, 3; 3, 5, 6; 1, 2, 5]
B*[1, 2, 3; 4, 5, 6; 7, 8, 9]
D = [
    [13.5993], [0.954056], [18.0465];
    [21.8832], [1.88839], [-1.82046];
    [17.3865], [13.4236], [23.8462]
]  # V
