f(x) := sin(x)/x
x1 := -3*π
Δx := π/36
x2 := 3*π
xLW := 100
yLW := 200
xHW := 800
yHW := 900
N := round((x2 - x1)/Δx)
N = 216
i := 0 .. N
X[i] := x1 + Δx*i  # массивы в МСК
Y[i] := f(X[i])
Z[i] := 1
xL := min(X)
yH := max(Y)
xL = -9.42478
yH = 1
-область*графика*в*МСК
xH := max(X)
yL := min(Y)
xH = 9.42478
yL = -0.217033
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Ms := stack(transpose(X), transpose(Y), transpose(Z))
ΔxW := xHW - xLW
ΔxX := xH - xL
ΔyW := yHW - yLW
ΔxW = 700
ΔxX = 18.8496
ΔxW = 700
Δy := yH - yL
kx := ΔxW/ΔxX
ky := ΔyW/Δy
Δy = 1.21703
kx = 37.1362
ky = 575.169
Tsw := [kx, 0, xLW - kx*xL; 0, -ky, yHW + ky*yL; 0, 0, 1]  # матрица пересчета
-марица*координат*□
Mw := Tsw*Ms
Xw := transpose(Mw)[:, 0]
Yw := -transpose(Mw)[:, 1]
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