f(x) := sqrt(x)*sin(x)
x1 := 0
x2 := 3*π
Δx := π/36
xLW := 100
yLW := 200
xHW := 800
yHW := 900
N := round((x2 - x1)/Δx)
N = 108
i := 0 .. N
X[i] := x1 + Δx*i
Y[i] := f(X[i])
Z[i] := 1
xL := min(X)
yH := max(Y)
xL = 0
yH = 2.8073
xH := max(X)
yL := min(Y)
xH = 9.42478
yL = -2.18247
Ms := stack(transpose(X), transpose(Y), transpose(Z))
ΔxW := xHW - xLW
ΔxX := xH - xL
ΔyW := yHW - yLW
ΔxW = 700
ΔxX = 9.42478
ΔxW = 700
Δy := yH - yL
kx := ΔxW/ΔxX
ky := ΔyW/Δy
Δy = 4.98977
kx = 74.2723
ky = 140.287
Tsw := [kx, 0, xLW - kx*xL; 0, -ky, yHW + ky*yL; 0, 0, 1]
Mw := Tsw*Ms
Xw := transpose(Mw)[:, 0]
Yw := -transpose(Mw)[:, 1]
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