XA := 5
YA := 2
XB := 10
YB := 12
XC := 13
YC := 8
XLW := 200
YLW := 300  # Левый верхний угол
XHW := 800
YHW := 700  # Правый нижний угол
ZX := transpose([XA, XB, XC])
ZY := transpose([YA, YB, YC])
XL := min(ZX) = 5  # Левый верхний угол в МСК
YH := max(ZY) = 12
XH := max(ZX) = 13  # Правый нижний угол в МСК
YL := min(ZY) = 2
ΔXW := XHW - XLW = 600  # Ширина области отображения в ОСК
ΔX := XH - XL = 8  # Ширина области отображения в МСК
ΔYW := YHW - YLW = 400  # Высота области отображения в ОСК
ΔY := YH - YL = 10  # Высота области отображения в МСК
KX := ΔXW/ΔX = 75
KY := ΔYW/ΔY = 40
TSW := [KX, 0, XLW - KX*XL; 0, -KY, YHW + KY*YL; 0, 0, 1]  # Матрица пересчета из МСК в ОСК
# Координаты вершин в ОСК
[XAW; YAW; q] := TSW*[XA; YA; 1] = [200; 700; 1]  # Вершина А
[XBW; YBW; q] := TSW*[XB; YB; 1] = [575; 300; 1]  # Вершина B
[XCW; YCW; q] := TSW*[XC; YC; 1] = [800; 460; 1]  # Вершина C
MABC := TSW*[XA, XB, XC; YA, YB, YC; 1, 1, 1] = [200, 575, 800; 700, 300, 460; 1, 1, 1]
X := transpose([XA, XB, XC, XA])
Y := transpose([YA, YB, YC, YA])
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# В мировой системе координат
XW := transpose([XAW, XBW, XCW, XAW])
YW := -transpose([YAW, YBW, YCW, YAW])
# В оконной системе координат
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