A := transpose([6, 0, 0, 1])
B := transpose([0, 0, 0, 1])
C := transpose([0, 6, 0, 1])
D := transpose([0, 0, 6, 1])
rv := 10
ϕvg := 315
ϕv := ϕvg*π/180
θvg := 45
θv := θvg*π/180
XLW := 200
YLW := 100
-оконные*оординаты
XHW := 700
YHW := 500
M := augment(A, B, C, D)
Rs(r, ϕ, θ) := [
    -sin(ϕ), cos(ϕ), 0, 0;
    -cos(θ)*cos(ϕ), -cos(θ)*sin(ϕ), sin(θ), 0;
    -sin(θ)*cos(ϕ), -sin(θ)*sin(ϕ), -cos(θ), r;
    0, 0, 0, 1
]
M1 := Rs(10, 315, 45)*M
XV := transpose(M1)[:, 0]
YV := transpose(M1)[:, 1]
IV := transpose(M1)[:, 3]
Pxy := stack(transpose(XV), transpose(YV), transpose(IV))
XL := min(XV)
YH := max(YV)
XL = -4.4708
YH = 5.10542
XH := max(XV)
YL := min(YV)
ΔXW := XHW - XLW = 500
Δx := XH - XL = 8.47229
ΔYW := YHW - YLW = 400
Δy := YH - YL = 7.45403
kx := ΔXW/Δx = 59.0159
ky := ΔYW/Δy = 53.6622
TSW := [kx, 0, XLW - kx*XL; 0, -ky, YHW + ky*YL; 0, 0, 1]
TRX := TSW*Pxy
TRW := vectorize(round(TRX))
[xa, xb, xc, xd; ya, yb, yc, yd; q, q, q, q] := TRW
X := transpose([xa, xb, xc, xa, xd, xb, xd, xc])
Y := -transpose([ya, yb, yc, ya, yd, yb, yd, yc])
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