# Смещение | Поворот
R(φ) := [cos(φ), sin(φ), 0; -sin(φ), cos(φ), 0; 0, 0, 1]
T(dx, dy) := [1, 0, -dx; 0, 1, -dy; 0, 0, 1]
X[0] := 6
X[2] := 8
X[3] := X[0]
X[1] := 6
Y[0] := 6
Y[2] := 6
Y[3] := Y[0]  # Начальные координаты
Y[1] := 8
φ := 90
dx1 := 6
dy1 := 6
dx2 := 2
dy2 := 3
P := [X[0], X[1], X[2]; Y[0], Y[1], Y[2]; 1, 1, 1]
P = [6, 6, 8; 6, 8, 6; 1, 1, 1]
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φ_rad := (φ*π)/180
# Смещаем СК в т А
P1 := T(dx1, dy1)*P
P1 = [0, 0, 2; 0, 2, 0; 1, 1, 1]
# Поворачиваем на 90 градусов по часовой
P2 := R(φ_rad)*P1  # Смещам треугольник
P2 = [0, 2, 0; 0, 0, -2; 1, 1, 1]
P3 := T(-dx2, -dy2)*P2
P3 = [2, 4, 2; 3, 3, 1; 1, 1, 1]
# Смещаем СК в исходное положение
P4 := T(-dx1, -dy1)*P3
P4 = [8, 10, 8; 9, 9, 7; 1, 1, 1]
