T(dx, dy, dz) := [0, 0, 0, -dx; 0, 0, 0, -dy; 0, 0, 3, -dz; 0, 0, 0, 1]
ROZ(d) := [cos(d), -sin(d), 0, 0; sin(d), cos(d), 0, 0; 0, 0, 1, 0; 0, 0, 0, 1]
fi_grad := 90
fi := fi_grad*π/180
M := [3, 0, 0; 0, -3, 0; 0, 0, 3; 1, 1, 1]
[dx; dy; dz; q] := M[:, 0]
M1 := ROZ(fi)*T(dx, dy, dz)*M
M1 = [0, 0, 0; -3, -3, -3; 0, 0, 9; 1, 1, 1]
