T(dx, dy) := [1, 0, -dx; 0, 1, -dy; 0, 0, 1]
R(f) := [cos(f), sin(f), 0; -sin(f), cos(f), 0; 0, 0, 1]
D(f) := [cos(f), -sin(f), 0; sin(f), cos(f), 0; 0, 0, 1]
# Находим координаты середины отрезка АВ
dx1 := 7
dy1 := 7
X[0] := 6
X[1] := 7
X[2] := 8
Y[0] := 8
Y[1] := 7
Y[2] := 6
P := [X[0], X[1], X[2]; Y[0], Y[1], Y[2]; 1, 1, 1]
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# Смещаем систему координат
# в точку М
P1 := T(dx1, dy1)*P
P1 = [-1, 0, 1; 1, 0, -1; 1, 1, 1]
a := 45
b := 60
f := a*π/180
k := b*π/180
# Относительно точки М поворачиваем на 45 градусов против часовой
P2 := D(f)*P1
# Смещаем систему координат в точку О
P2 = [-1.41421, 0, 1.41421; 0, 0, 0; 1, 1, 1]
P3 := T(-dx1, -dy1)*P2
# Относительно точки О поворачиваем
# на 60 градусов по часовой стрелке
P3 = [5.58579, 7, 8.41421; 7, 7, 7; 1, 1, 1]
P4 := R(k)*P3
V[0] := P4[0, 0]
V[1] := P4[0, 1]
V[2] := P4[0, 2]
U[0] := P4[1, 0]
U[1] := P4[1, 1]
U[2] := P4[1, 2]
P4 = [8.85507, 9.56218, 10.2693; -1.33743, -2.56218, -3.78692; 1, 1, 1]
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