# Смещение | Поворот
R(φ) := [cos(φ), sin(φ), 0; -sin(φ), cos(φ), 0; 0, 0, 1]
T(dx, dy) := [1, 0, -dx; 0, 1, -dy; 0, 0, 1]
X[0] := -7
X[2] := -5
X[3] := X[0]
X[1] := -7
Y[0] := 5
Y[2] := 7
Y[3] := Y[0]  # Начальные координаты
Y[1] := 7
φ := 45
dx1 := -7
dy1 := 7
dx2 := 3
dy2 := -2
P := [X[0], X[1], X[2]; Y[0], Y[1], Y[2]; 1, 1, 1]
P = [-7, -7, -5; 5, 7, 7; 1, 1, 1]
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φ_rad := (φ*π)/180
# Смещаем СК в т А
P1 := T(dx1, dy1)*P
P1 = [0, 0, 2; -2, 0, 0; 1, 1, 1]
# Поворачиваем на 90 градусов по часовой
P2 := R(φ_rad)*P1  # Смещам треугольник
P2 = [-1.41421, 0, 1.41421; -1.41421, 0, -1.41421; 1, 1, 1]
P3 := T(-dx2, -dy2)*P2
P3 = [1.58579, 3, 4.41421; -3.41421, -2, -3.41421; 1, 1, 1]
# Смещаем СК в исходное положение
P4 := T(-dx1, -dy1)*P3
P4 = [-5.41421, -4, -2.58579; 3.58579, 5, 3.58579; 1, 1, 1]
