X[0] := -4
X[1] := -4
move(dx, dy) := [1, 0, -dx; 0, 1, -dy; 0, 0, 1]
Y[1] := 5
Y[0] := 3
MY := (Y[0] + Y[1])/2
MX := (X[0] + X[1])/2
rotateM(fi) := [cos(fi), sin(fi), 0; -sin(fi), cos(fi), 0; 0, 0, 1]
MX = -4
MY = 4
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P := [X[0], X[1]; Y[0], Y[1]; 1, 1]
P = [-4, -4; 3, 5; 1, 1]
fi1 := 90
fi2 := 45
fi_rad1 := (fi1*π)/180
fi_rad2 := (fi2*π)/180
# Смещаем отрезок. Точку М делаем началом СК
P1 := move(MX, MY)*P
P1 = [0, 0; -1, 1; 1, 1]
# Вращаем отрезок на 90 против часовой. Т.е вращаем СК на 90 по часовой
P2 := rotateM(-fi_rad1)*P1
P2 = [1, -1; 0, 0; 1, 1]
# Возвращаем отрезок на место
P3 := move(-MX, -MY)*P2
P3 = [-3, -5; 4, 4; 1, 1]
# Вращаем относительно О на 45 по часовой т. е вращаем СК на 45 против часовой
P4 := rotateM(fi_rad2)*P3
P4 = [0.707107, -0.707107; 4.94975, 6.36396; 1, 1]
V[1] := P4[0, 1]
V[0] := P4[0, 0]
V[2] := P4[0, 0]
U[0] := P4[1, 0]
U[1] := P4[1, 1]
U[2] := P4[1, 0]
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