R(f) := [cos(f), sin(f), 0; -sin(f), cos(f), 0; 0, 0, 1]
D(f) := [cos(f), -sin(f), 0; sin(f), cos(f), 0; 0, 0, 1]
T(dx, dy) := [1, 0, -dx; 0, 1, -dy; 0, 0, 1]
X[1] := -4
X[0] := -6
Y[1] := 5
Y[0] := 5
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P := [X[0], X[1]; Y[0], Y[1]; 1, 1]
# Поворачиваем вокруг начала координат на 90 градусов по часовой
a := 90
f := a*π/180
P1 := R(f)*P
P1 = [5, 5; 6, 4; 1, 1]
# Находим середину отрезка АB
dx1 := 5
dy1 := 5
# Смещаем систему координат в центр отрезка
P2 := T(dx1, dy1)*P1
P2 = [0, 0; 1, -1; 1, 1]
# Относительно центра отрезка поворачиваем
# на 45 градусов против часовой стрелке
P3 := D(f)*P2
P3 = [-1, 1; 0, 0; 1, 1]
# Возвращаем в исходную систему координат XOY
P4 := T(-dx1, -dy1)*P3
P4 = [4, 6; 5, 5; 1, 1]
V[0] := P4[0, 0]
V[1] := P4[0, 1]
U[0] := P4[1, 0]
U[1] := P4[1, 1]
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