A := [-3; 2; 1]
B := [-8; 4; 1]
C := [3; 15; 1]
ABx := [A[0]; B[0]] = [-3; -8]
ABy := [A[1]; B[1]] = [2; 4]
BCx := [B[0]; C[0]] = [-8; 3]
BCy := [B[1]; C[1]] = [4; 15]
ACx := [A[0]; C[0]] = [-3; 3]
ACy := [A[1]; C[1]] = [2; 15]
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xL := -10
xLw := 100
yH := 15
yHw := 50
xH := 5
xHw := 500
yL := 0
yLw := 400
Δxw := xHw - xLw = 400
Δx := xH - xL = 15
Δyw := yHw - yLw = -350
Δy := yH - yL = 15
kx := Δxw/Δx = 26.6667
ky := Δyw/Δy = -23.3333
T := [kx, 0, xLw - kx*xL; 0, -ky, yHw - ky*yL; 0, 0, 1] = [26.6667, 0, 366.667; 0, 23.3333, 50; 0, 0, 1]
Aw := T*A = [286.667; 96.6667; 1]
Bw := T*B = [153.333; 143.333; 1]
Cw := T*C = [446.667; 400; 1]
ABwx := [Aw[0]; Bw[0]] = [286.667; 153.333]
ABwy := [Aw[1]; Bw[1]] = [96.6667; 143.333]
BCwx := [Bw[0]; Cw[0]] = [153.333; 446.667]
BCwy := [Bw[1]; Cw[1]] = [143.333; 400]
ACwx := [Aw[0]; Cw[0]] = [286.667; 446.667]
ACwy := [Aw[1]; Cw[1]] = [96.6667; 400]
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