T(dx, dy) := [1, 0, -dx; 0, 1, -dy; 0, 0, 1]
R(ϕ) := [cos(ϕ), sin(ϕ), 0; -sin(ϕ), cos(ϕ), 0; 0, 0, 1]
X[0] := 6
X[1] := 6
X[2] := 8
X[3] := X[0]
Y[0] := 6
Y[1] := 8
Y[2] := 6
Y[3] := Y[0]
dx2 := 2
φ := 90
dx1 := 6
dy1 := 6
dy2 := 3
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φ_rad := π*φ/180
φ_rad = 1.5708
p := [X[0], X[1], X[2]; Y[0], Y[1], Y[2]; 1, 1, 1]
p = [6, 6, 8; 6, 8, 6; 1, 1, 1]
p1 := T(dx1, dy1)*p
p1 = [0, 0, 2; 0, 2, 0; 1, 1, 1]
p2 := R(φ_rad)*p1
p2 = [0, 2, 0; 0, 0, -2; 1, 1, 1]
p3 := T(-dx2, -dy2)*p2
p3 = [2, 4, 2; 3, 3, 1; 1, 1, 1]
p4 := T(-dx1, -dy1)*p3
p4 = [8, 10, 8; 9, 9, 7; 1, 1, 1]
V[0] := p4[0, 0]
V[1] := p4[0, 1]
V[2] := p4[0, 2]
V[3] := V[0]
U[0] := p4[1, 0]
U[1] := p4[1, 1]
U[2] := p4[1, 2]
U[3] := U[0]
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