x[1] := 3
x[2] := 0
x[3] := 0
y[1] := 0
y[2] := -3
y[3] := 0
z[1] := 0
z[2] := 0
z[3] := 3
M := [x[1], x[2], x[3]; y[1], y[2], y[3]; z[1], z[2], z[3]; 1, 1, 1] = [3, 0, 0; 0, -3, 0; 0, 0, 3; 1, 1, 1]
Roz(fi) := [cos(fi), -sin(fi), 0, 0; sin(fi), cos(fi), 0, 0; 0, 0, 1, 0; 0, 0, 0, 1]
T(dx, dy, dz) := [1, 0, 0, dx; 0, 1, 0, dy; 0, 0, 1, dz; 0, 0, 0, 1]
fi := 90
fi_rad := fi*π/180
M1 := Roz(fi_rad)*M = [0, 3, 0; 3, 0, 0; 0, 0, 3; 1, 1, 1]
M2 := T(0, 0, 3)*M1 = [0, 3, 0; 3, 0, 0; 3, 3, 6; 1, 1, 1]
