x[1] := 1
y[1] := 1
z[1] := 1
x[2] := 5
y[2] := 5
z[2] := 1
dx := 3
dy := 3
dz := 1
Ts(dx, dy, dz) := [1, 0, 0, -dx; 0, 1, 0, -dy; 0, 0, 1, -dz; 0, 0, 0, 1]
M := [x[1], x[2]; y[1], y[2]; z[1], z[2]; 1, 1] = [1, 5; 1, 5; 1, 1; 1, 1]
M1 := Ts(dx, dy, 1)*M = [-2, 2; -2, 2; 0, 0; 1, 1]
T2(dx, dy) := [1, 0, -dx; 0, 1, -dy; 0, 0, 1]
M2 := [-2, 2; -2, 2; 1, 1]
fi_rad := 45*π/180
R2(fi) := [cos(fi), sin(fi), 0; -sin(fi), cos(fi), 0; 0, 0, 1]
M3 := R2(-fi_rad)*M2 = [0, 0; -2.82843, 2.82843; 1, 1]
M3 := T2(2, 0)*M3 = [-2, -2; -2.82843, 2.82843; 1, 1]
M4 := T2(-dx, -dy)*M3 = [1, 1; 0.171573, 5.82843; 1, 1]
