x[3] := 0
x[0] := 1
x[1] := 0
x[2] := 0
y[3] := 0
y[0] := 0
y[1] := 0
y[2] := 1
z[3] := 2
z[0] := 0
z[1] := 0
z[2] := 0
A := transpose([x[0], y[0], z[0]]) = [1; 0; 0]
B := transpose([x[1], y[1], z[1]]) = [0; 0; 0]
C := transpose([x[2], y[2], z[2]]) = [0; 1; 0]
D := transpose([x[3], y[3], z[3]]) = [0; 0; 2]
r := 1
fi_g := 45
te_g := 30
fi := fi_g*π/180
te := te_g*π/180
BC := C - B = [0; 1; 0]
AC := C - A = [-1; 1; 0]
BA := A - B = [1; 0; 0]
BD := D - B = [0; 0; 2]
AD := D - A = [-1; 0; 2]
N1 := AC×AD = [2; 2; 1]
N2 := BA×BD = [0; -2; 0]
N3 := BC×BA = [0; 0; -1]
N4 := BD×BC = [-2; 0; 0]
Xr := r*sin(te)*cos(fi) = 0.353553
Yr := r*sin(te)*sin(fi) = 0.353553
Zr := r*cos(te) = 0.866025
R := [Xr; Yr; Zr] = [0.353553; 0.353553; 0.866025]
cos_a1 := R*N1/(|R|*|N1|) = 0.76008
cos_a2 := R*N2/(|R|*|N2|) = -0.353553
cos_a3 := R*N3/(|R|*|N3|) = -0.866025
cos_a4 := R*N4/(|R|*|N4|) = -0.353553
