T(dx, dy) := [1, 0, -dx; 0, 1, -dy; 0, 0, 1]
R(φ) := [cos(φ), sin(φ), 0; -sin(φ), cos(φ), 0; 0, 0, 1]
X[0] := -1
X[1] := -1
X[2] := 1
X[3] := 1
X[4] := X[0]
Y[0] := -1
Y[1] := 1
Y[2] := 1
Y[3] := -1
Y[4] := Y[0]
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φ := 45
dx1 := 0
dy1 := 0
φ_rad := φ*π/180
dx2 := 10
dy2 := 10
p := [X[0], X[1], X[2], X[3]; Y[0], Y[1], Y[2], Y[3]; 1, 1, 1, 1]
p = [-1, -1, 1, 1; -1, 1, 1, -1; 1, 1, 1, 1]
p1 := T(dx1, dy1)*p
p1 = [-1, -1, 1, 1; -1, 1, 1, -1; 1, 1, 1, 1]
p2 := R(-φ_rad)*p1
p2 = [0, -1.41421, 0, 1.41421; -1.41421, 0, 1.41421, 0; 1, 1, 1, 1]
p3 := T(-dx2, -dy2)*p2
p3 = [10, 8.58579, 10, 11.4142; 8.58579, 10, 11.4142, 10; 1, 1, 1, 1]
V[0] := p3[0, 0]
V[1] := p3[0, 1]
V[2] := p3[0, 2]
V[3] := p3[0, 3]
V[4] := V[0]
U[0] := p3[1, 0]
U[1] := p3[1, 1]
U[2] := p3[1, 2]
U[3] := p3[1, 3]
U[4] := U[0]
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