T(dx, dy) := [1, 0, -dx; 0, 1, -dy; 0, 0, 1]
R(fi) := [cos(fi), sin(fi), 0; -sin(fi), cos(fi), 0; 0, 0, 1]
X[0] := 2
X[1] := 5
X[2] := X[0]
Y[0] := 5
Y[1] := 6
Y[2] := Y[0]
fi := 45
fi2 := 45
fi_rad := fi*π/180
dx1 := X[0]
dy1 := Y[0]
dx2 := X[1]
dy2 := Y[1]
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p := [X[0], X[1]; Y[0], Y[1]; 1, 1]
p = [2, 5; 5, 6; 1, 1]
p1 := T(dx1, dy1)*p
p1 = [0, 3; 0, 1; 1, 1]
p2 := R(fi_rad)*p1
p2 = [0, 2.82843; 0, -1.41421; 1, 1]
p3 := T(-dx1, -dy1)*p2
p3 = [2, 4.82843; 5, 3.58579; 1, 1]
p4 := T(dx2, dy2)*p3
p4 = [-3, -0.171573; -1, -2.41421; 1, 1]
p5 := R(-fi_rad)*p4
p5 = [-1.41421, 1.58579; -2.82843, -1.82843; 1, 1]
p6 := T(-dx2, -dy2)*p5
p6 = [3.58579, 6.58579; 3.17157, 4.17157; 1, 1]
V[0] := p6[0, 0]
V[1] := p6[0, 1]
V[2] := V[0]
U[0] := p6[1, 0]
U[1] := p6[1, 1]
U[2] := U[0]
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