T(dx, dy) := [1, 0, -dx; 0, 1, -dy; 0, 0, 1]
R(fi) := [cos(fi), sin(fi), 0; -sin(fi), cos(fi), 0; 0, 0, 1]
X[0] := -4
X[1] := -4
X[2] := X[0]
Y[0] := 3
Y[1] := 5
Y[2] := Y[0]
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dx1 := -4
dy1 := 4
p := [X[0], X[1]; Y[0], Y[1]; 1, 1]
fi := 90
fi_rad := fi*π/180
fi2 := 45
fi2_rad := fi2*π/180
p1 := T(dx1, dy1)*p
p1 = [0, 0; -1, 1; 1, 1]
p2 := R(fi_rad)*p1
p2 = [-1, 1; 0, 0; 1, 1]
p3 := T(-dx1, -dy1)*p2
p3 = [-5, -3; 4, 4; 1, 1]
p4 := R(-fi2_rad)*p3
p4 = [-6.36396, -4.94975; -0.707107, 0.707107; 1, 1]
V[0] := p4[0, 0]
V[1] := p4[0, 1]
V[2] := V[0]
U[0] := p4[1, 0]
U[1] := p4[1, 1]
U[2] := U[0]
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