X[1] := 10
X[0] := 1
V[1] := 8
V[0] := 5
Y[1] := 8
Y[0] := 2
U[1] := 2
U[0] := 7
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Given
X[0]*x1 + x2 == Y[0]
X[1]*x1 + x2 == Y[1]
Find(x1, x2) → [2/3; 4/3]
A := 2/3
B := 4/3
Given
V[0]*a1 + a2 == U[0]
V[1]*a1 + a2 == U[1]
Find(a1, a2) → [-5/3; 46/3]
A1 := -5/3
B1 := 46/3
f2(x) := A1*x + B1
x := (B1 - B)/(A - A1) = 6
y := f2(x) = 5.33333
