φ := 30
φ_rad := π*φ/180
X[0] := 5
X[1] := 0
X[2] := 0
Y[0] := 0
Y[1] := 5
Y[2] := 0
X[3] := X[0]
Z[0] := 0
Z[1] := 0
Z[2] := 10
Y[3] := Y[0]
Z[3] := Z[0]
M1 := [X[0], X[1], X[2], X[3]; Y[0], Y[1], Y[2], Y[3]; Z[0], Z[1], Z[2], Z[3]; 1, 1, 1, 1]
α := atan(Y[1]/X[0])
α_rad := π*α/180
RSY(φ) := [cos(φ), 0, -sin(φ), 0; 0, 1, 0, 0; sin(φ), 0, cos(φ), 0; 0, 0, 0, 1]
TS(Δx, Δy, Δz) := [1, 0, 0, -Δx; 0, 1, 0, -Δy; 0, 0, 1, -Δz; 0, 0, 0, 1]
ROZ(φ) := [cos(φ), -sin(φ), 0, 0; sin(φ), cos(φ), 0, 0; 0, 0, 1, 0; 0, 0, 0, 1]
M2 := TS(-X[0], -Y[0], -Z[0])*M1
M3 := RSY(α_rad)*M2
M4 := ROZ(φ_rad)*M3
M5 := RSY(-α_rad)*M4
M6 := TS(X[0], Y[0], Z[0])*M5
