X[0] := 1
X[1] := 5
Y[1] := 5
Y[0] := 1
Z[0] := 1
Z[1] := 1
dx := 3
dy := 3
M1 := [X[0], X[1]; Y[0], Y[1]; Z[0], Z[1]; 1, 1] = [1, 5; 1, 5; 1, 1; 1, 1]
dz := 1
TS(dx, dy, dz) := [1, 0, 0, -dx; 0, 1, 0, -dy; 0, 0, 1, -dz; 0, 0, 0, 1]
M2 := TS(dx, dy, 1)*M1 = [-2, 2; -2, 2; 0, 0; 1, 1]
T2(dx, dy) := [1, 0, -dx; 0, 1, -dy; 0, 0, -1]
M3 := [-2, 2; -2, 2; 1, 1]
φ_rad := π*45/180
R2(φ) := [cos(φ), sin(φ), 0; -sin(φ), cos(φ), 0; 0, 0, 1]
M4 := R2(-φ_rad)*M3 = [0, 0; -2.82843, 2.82843; 1, 1]
M5 := T2(2, 0)*M4 = [-2, -2; -2.82843, 2.82843; -1, -1]
M7 := [-2, -2; -2.828, 2.828; 0, 0; 1, 1]
M8 := TS(-dx, -dy, -1)*M7 = [1, 1; 0.172, 5.828; 1, 1; 1, 1]
