D := [0; 0; 2; 1]
A := [1; 0; 0; 1]
B := [0; 0; 0; 1]
C := [0; 1; 0; 1]
M1 := augment(A, B, C, D) = [1, 0, 0, 0; 0, 0, 1, 0; 0, 0, 0, 2; 1, 1, 1, 1]
rv := 1
φvg := 45
φv := φvg*π/180
θvg := 30
θv := θvg*π/180
RV := [
    -sin(φv), cos(φv), 0, 0;
    -cos(θv)*cos(φv), -cos(θv)*sin(φv), sin(θv), 0;
    -sin(θv)*cos(φv), -sin(θv)*sin(φv), -cos(θv), rv;
    0, 0, 0, 1
]
MV := RV*M1
ZK := transpose(MV)[:, 3]
XK := transpose(MV)[:, 0] = [-0.707107; 0; 0.707107; 0]
YK := transpose(MV)[:, 1]
M2 := stack(transpose(XK), transpose(YK), transpose(ZK))
M2 = [-0.707107, 0, 0.707107, 0; -0.612372, 0, -0.612372, 1; 1, 1, 1, 1]
2
Xr := rv*sin(θv)*cos(φv)
Yr := rv*sin(θv)*sin(φv)
Zr := rv*cos(θv)
R := [Xr; Yr; Zr]
AD := A - D = [1; 0; -2; 0]
AD := [1; 0; -2]
AC := A - C = [1; -1; 0; 0]
AC := [1; -1; 0]
AB := A - B = [1; 0; 0; 0]
AB := [1; 0; 0]
BC := B - C = [0; -1; 0; 0]
BC := [0; -1; 0]
BD := B - D = [0; 0; -2; 0]
BD := [0; 0; -2]
NABC := AB×AC = [0; 0; -1]
NADC := AC×AD = [2; 2; 1]
NDBC := BD×BC = [-2; 0; 0]
NADB := AD×AB = [0; -2; 0]
(NADC*R)/(|NADC|*|R|) = 0.76008
(NABC*R)/(|NABC|*|R|) = -0.866025
(NDBC*R)/(|NDBC|*|R|) = -0.353553
(NADB*R)/(|NADB|*|R|) = -0.353553
