A := [6; 8; 1]
B := [8; 6; 1]
S := [7; 7; 1]
R(φ) := [cos(φ), -sin(φ), 0; sin(φ), cos(φ), 0; 0, 0, 1]
T(dx, dy) := [1, 0, -dx; 0, 1, -dy; 0, 0, 1]
M1 := augment(A, S, B)
Y := transpose(M1)[:, 1]
X := transpose(M1)[:, 0]
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rad := π*45/180
M2 := T(7, 7)*M1
M3 := R(rad)*M2
M4 := T(-7, -7)*M3
Y := transpose(M4)[:, 1]
X := transpose(M4)[:, 0]
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M5 := T(0, 0)*M4
M6 := R(π*60/180)*M5
Y := transpose(M6)[:, 1]
X := transpose(M6)[:, 0]
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