A := [-7; 5; 1]
D := A
B := [-7; 7; 1]
C := [-5; 7; 1]
M1 := augment(A, B, C, D) = [-7, -7, -5, -7; 5, 7, 7, 5; 1, 1, 1, 1]
X := transpose(M1)[:, 0]
Y := transpose(M1)[:, 1]
R(φ) := [cos(φ), -sin(φ), 0; sin(φ), cos(φ), 0; 0, 0, 1]
T(dx, dy) := [1, 0, -dx; 0, 1, -dy; 0, 0, 1]
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M2 := T(-7, 7)*M1
M3 := R(π*(-45/180))*M2
M4 := T(7, -7)*M3
X := transpose(M4)[:, 0]
Y := transpose(M4)[:, 1]
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M5 := T(-3, 2)*M4
X := transpose(M5)[:, 0]
Y := transpose(M5)[:, 1]
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