Y[0] := -1
Y[1] := 1
Y[2] := 1
Y[3] := -1
Y[4] := Y[0]
X[0] := -1
X[1] := -1
X[2] := 1
X[3] := 1
X[4] := X[0]
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RS(φ) := [cos(φ), sin(φ), 0; -sin(φ), cos(φ), 0; 0, 0, 1]
T(dx, dy) := [1, 0, dx; 0, 1, dy; 0, 0, 1]
M1 := [X[0], X[1], X[2], X[3], X[4]; Y[0], Y[1], Y[2], Y[3], Y[4]; 1, 1, 1, 1, 1]
M2 := RS(π*45/180)*M1
X := transpose(M2)[:, 0]
Y := transpose(M2)[:, 1]
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M3 := T(5*sqrt(2), 5*sqrt(2))*M2
X := transpose(M3)[:, 0]
Y := transpose(M3)[:, 1]
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