A := [7; 0; 0; 1]
B := [0; -10; 0; 1]
C := [0; 0; 20; 1]
M1 := augment(A, B, C) = [7, 0, 0; 0, -10, 0; 0, 0, 20; 1, 1, 1]
rv := 10
φvg := 135
φv := φvg*π/180
θvg := 45
θv := θvg*π/180
RV := [
    -sin(φv), cos(φv), 0, 0;
    -cos(θv)*cos(φv), -cos(θv)*sin(φv), sin(θv), 0;
    -sin(θv)*cos(φv), -sin(θv)*sin(φv), -cos(θv), rv;
    0, 0, 0, 1
]
M2 := RV*M1 = [-4.94975, 7.07107, 0; 3.5, 5, 14.1421; 13.5, 15, -4.14214; 1, 1, 1]
X1 := transpose(M2)[:, 0] = [-4.94975; 7.07107; 0]
Y1 := transpose(M2)[:, 1] = [3.5; 5; 14.1421]
Z1 := transpose(M2)[:, 3] = [1; 1; 1]
M3 := stack(transpose(X1), transpose(Y1), transpose(Z1)) = [-4.94975, 7.07107, 0; 3.5, 5, 14.1421; 1, 1, 1]
X := transpose(M3)[:, 0]
Y := transpose(M3)[:, 1]
Z := transpose(M3)[:, 2]
MXL := min(X)
MYH := max(Y)
MXH := max(X)
MYL := min(Y)
ΔMX := MXH - MXL
ΔMY := MYH - MYL
WXL := 0
WYH := 500
WXH := 600
WYL := 10
ΔWX := WXH - WXL
ΔWY := WYH - WYL
ky := ΔWY/ΔMY
kx := ΔWX/ΔMX
TMW := [kx, 0, WXL - kx*MXL; 0, -ky, WYH + ky*MYL; 0, 0, 1]
M4 := TMW*M3
TRW := vectorize(round(TMW))
[xa, xb, xc; ya, yb, yc; q, q, q] := TRW
X := transpose([xa, xb, xc, xa])
Y := -transpose([ya, yb, yc, ya])
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