Z := [1; 1; 1; 1]
X := [1; 5; 10; 1]
Y := [4; 5; 8; 4]
M1 := stack(transpose(X), transpose(Y), transpose(Z)) = [1, 5, 10, 1; 4, 5, 8, 4; 1, 1, 1, 1]
MXL := min(X)
MYH := max(Y)
MXH := max(X)
MYL := min(Y)
ΔMX := MXH - MXL
ΔMY := MYH - MYL
WXL := 0
WYH := 500
WXH := 600
WYL := 10
ΔWX := WXH - WXL
ΔWY := WYH - WYL
ky := ΔWY/ΔMY
kx := ΔWX/ΔMX
TMW := [kx, 0, WXL - kx*MXL; 0, -ky, WYH + ky*MYL; 0, 0, 1]
M2 := TMW*M1
XW := transpose(M2)[:, 0]
YW := (-transpose(M2))[:, 1]
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