A := [-3; 2; 1]
B := [-8; 4; 1]
C := [3; 15; 1]
D := A
M1 := augment(A, B, C, D) = [-3, -8, 3, -3; 2, 4, 15, 2; 1, 1, 1, 1]
X := transpose(M1)[:, 0]
Y := transpose(M1)[:, 1]
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MXH := max(X)
MXL := min(X)
MYL := min(Y)
MYH := max(Y)
WXH := 500
WXL := 100
WYL := 50
WYH := 450
ΔWX := WXH - WXL = 400
ΔMX := MXH - MXL = 11
ΔWY := WYH - WYL = 400
ΔMY := MYH - MYL = 13
ky := ΔWY/ΔMY
kx := ΔWX/ΔMX = 36.3636
T := [kx, 0, WXL - kx*MXL; 0, -ky, WYH + ky*MYL; 0, 0, 1]
M2 := T*M1
X := transpose(M2)[:, 0]
Y := transpose(-M2)[:, 1]
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