A := [5; 0; 0; 1]
B := [0; -6; 0; 1]
C := [0; 0; 8; 1]
D := A
M1 := augment(A, B, C, D)
r := 50
φ := 45
φ_rad := π*φ/180
θ := 30
θ_rad := π*θ/180
R(r, φ, θ) := [
    -sin(φ), cos(φ), 0, 0;
    -cos(θ)*cos(φ), -cos(θ)*sin(φ), sin(θ), 0;
    -sin(θ)*cos(φ), -sin(θ)*sin(φ), -cos(θ), r;
    0, 0, 0, 1
]
M2 := R(r, φ_rad, θ_rad)*M1
WXH := 500
WXL := 100
WYH := 450
WYL := 50
ΔWX := WXH - WXL = 400
ΔWY := WYH - WYL = 400
X := transpose(M2)[:, 0]
Y := transpose(M2)[:, 1]
MXH := max(X)
MXL := min(X)
MYH := max(Y)
MYL := min(Y)
ΔMX := MXH - MXL = 4.24264
ΔMY := MYH - MYL = 7.06186
ky := ΔWY/ΔMY
kx := ΔWX/ΔMX
M3 := [X[0], X[1], X[2], X[3]; Y[0], Y[1], Y[2], Y[3]; 1, 1, 1, 1]
T := [kx, 0, WXL - kx*MXL; 0, -ky, WYH + ky*MYL; 0, 0, 1]
M4 := T*M3
X := transpose(M4)[:, 0]
Y := transpose(-M4)[:, 1]
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