A := [0; -3]
B := [-3; 5]
C := [3; 5]
M1 := [A[0], B[0], C[0], A[0]; A[1], B[1], C[1], A[1]; 1, 1, 1, 1] = [0, -3, 3, 0; -3, 5, 5, -3; 1, 1, 1, 1]
RO(φ) := [cos(φ), sin(φ), 0; -sin(φ), cos(φ), 0; 0, 0, 1]
TK(Δx, Δy) := [1, 0, -Δx; 0, 1, -Δy; 0, 0, 1]
φ := 45
φ_rad := π*φ/180
M2 := TK(A[0], A[1])*M1
M3 := RO(φ_rad)*M2
M4 := TK(-A[0], -A[1])*M3
X1 := transpose(M4)[:, 0]
Y1 := transpose(M4)[:, 1]
X := transpose(M1)[:, 0]
Y := transpose(M1)[:, 1]
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