A := [5; 0; 0]
B := [0; -6; 0]
C := [0; 0; 8]
M1 := [A[0], B[0], C[0]; A[1], B[1], C[1]; A[2], B[2], C[2]; 1, 1, 1]
φ := 45
φ_rad := π*φ/180
θ := 30
θ_rad := π*θ/180
RKZ(φ) := [cos(φ), sin(φ), 0, 0; -sin(φ), cos(φ), 0, 0; 0, 0, 1, 0; 0, 0, 0, 1]
ROX(φ) := [1, 0, 0, 0; 0, cos(φ), -sin(φ), 0; 0, sin(φ), cos(φ), 0; 0, 0, 0, 1]
M2 := ROX(φ_rad)*M1 = [5, 0, 0; 0, -4.24264, -5.65685; 0, -4.24264, 5.65685; 1, 1, 1]
M3 := RKZ(θ_rad)*M2 = [4.33013, -2.12132, -2.82843; -2.5, -3.67423, -4.89898; 0, -4.24264, 5.65685; 1, 1, 1]
