X1 := 6
X2 := 8
X0 := 6
Y1 := 8
Y2 := 6
Y0 := 6
M1 := [X0, X1, X2, X0; Y0, Y1, Y2, Y0; 1, 1, 1, 1]
Y := transpose(M1)[:, 1]
X := transpose(M1)[:, 0]
TS(dx, dy) := [1, 0, -dx; 0, 1, -dy; 0, 0, 1]
RS(φ) := [cos(φ), sin(φ), 0; -sin(φ), cos(φ), 0; 0, 0, 1]
Δx := 2
Δy := 3
φ := 90
φ_rad := φ*π/180
M2 := TS(X0, Y0)*M1
Y1 := transpose(M2)[:, 1]
X1 := transpose(M2)[:, 0]
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M3 := RS(φ_rad)*M2
Y3 := transpose(M3)[:, 1]
X3 := transpose(M3)[:, 0]
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M4 := TS(-Δx, -Δy)*M3
Y4 := transpose(M4)[:, 1]
X4 := transpose(M4)[:, 0]
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