x := 2
n := 3
y := (sqrt(x^3 + n) + cos(|n*x - 1|))/nthroot(x^5 + 8*x + n, 4)
y = 1.34724
y := (sum(sin(i/n), i = 1 .. 10) + sum((i - n)/(i + n), i = 1 .. 5))/(sum((i^2 + 2)/cos(n + i), i = 1 .. 5)*product((n + 3*i)/(n^2 + n*i - n), i = 1 .. 5))
y = -0.14368
a := -π/2
b := π/2
I := integral((x - 1)*sin(n*x - 2)*nthroot((x^2 - n*x + 1), 3), x = a .. b)
I = -1.64008
x := -2, -1.6 .. 2
f(x) := (x^2 - n*x + cos(x)*sqrt(|x - sin(n*x)|))
f(x) = [9.37171; 7.31295; 5.5044; 3.28587; 2.03183; 2.98023e-8; -0.368169; -1.51413; -1.6956; -2.28705; -2.62829]
filename := "MatrA.txt"
A := READPRN(filename)
B := [3, 1, 5; 5, 14, 0; 1, 3, 2]
A = [7, 8, 1; 14, 6, 15; 0, 2, 0]
# Random Matrix
a := -2*n
b := 2*n
i := 0 .. 2
j := 0 .. 2
D[i, j] := |runif(1, a, b)|
V[i, 0] := |runif(1, a, b)|
D = [5.98478, 3.68012, 1.02007; 1.7963, 3.87405, 3.91045; 2.52594, 2.35217, 4.90306]
V = [4.23224; 5.8621; 4.57104]
d := |A|
d = -182
C := A^-1
C = [0.164835, -0.010989, -0.626374; 0, 0, 0.5; -0.153846, 0.0769231, 0.384615]
I := A*C = [1, 0, 0; 0, 1, 0; 0, 0, 1]
M := A*B = [62, 122, 37; 87, 143, 100; 10, 28, 0]
W := transpose(V)*V = 73.1705
P := D*V = [51.5651; 48.1873; 46.8912]
U := V*transpose(V) = [17.9118, 24.8098, 19.3457; 24.8098, 34.3642, 26.7959; 19.3457, 26.7959, 20.8944]
g := length(V) = 3
rowsA := rows(A) = 3
q := |max(A) - min(A)|/(max(A) + min(A)) = 1
colsA := cols(A) = 3
p := max(B)*sin(g) + min(B)*cos(g) = 1.97568
r := p*sin(q) + q*cos(p) = 1.26857
# Diagrams
x := -3*π .. 3*π
y(x) := e^(-(|x|/3))*cos(x)
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x := -9, -8.75 .. 9
f(x) :=
    (e^x*x^3) if x < 0
    (e^(-x)*x^3) if x ≥ 0
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q(x) := e^(-x^2)
x := -3 .. 3
q(x) = [0.00012341; 0.0183156; 0.367879; 1; 0.367879; 0.0183156; 0.00012341]
d/dx(q(x)) = [0.000740459; 0.0732626; 0.735759; 0; -0.735759; -0.0732626; -0.000740459]
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h(x, y) := sin(sqrt(x^2 + y^2))/sqrt(x^2 + y^2)
x1 := -15
x2 := 15
Δx := 1
Nx := 43
y1 := -15
y2 := 15
Δy := 1
Ny := 43
i := 0 .. Nx - 1
x[i] := x1 + i*Δx
j := 0 .. Ny - 1
y[j] := y1 + j*Δy
M[i, j] := h(x[i], y[j])
# [component: inputs M]
x := -3 .. 3
c(x) := x^4 - 11*x^2 + 2*x + 15
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x := 2
Minimize(c, x) = 2.29836
x := 0
Maximize(c, x) = 0.0910463
x := -2
Minimize(c, x) = -2.38941
