f(x) := sqrt(x)*sin(x)
x_1 := 0
x_2 := 6*π
Δx := π/36
x_LW := 100
y_LW := 200  # Левый верхний угол
x_HW := 800
y_HW := 900  # Правый нижний угол
n := round((x_2 - x_1)/Δx)
n = 216
i := 0 .. n
x[i] := x_1 + i*Δx
z[i] := 1
y[i] := f(x[i])
X_L := min(x)
Y_H := max(y)  # Левый верхний угол в МСК
X_L = 0
Y_H = 3.75994  # Правый нижний угол в МСК
X_H := max(x)
Y_L := min(y)
X_H = 18.8496
Y_L = -4.15677
M_S := stack(transpose(x), transpose(y), transpose(z))
Δx_w := x_HW - x_LW
Δx_w = 700  # Ширина области отображения в ОСК
ΔX := X_H - X_L
ΔX = 18.8496  # Ширина области отображения в МСК
Δy_w := y_HW - y_LW
Δy_w = 700
ΔY := Y_H - Y_L
ΔY = 7.91672  # Высота области отображения в ОСК
# Высота области отображения в МСК
K_x := Δx_w/ΔX
K_x = 37.1362
K_y := Δy_w/ΔY
K_y = 88.4205
T_SW := [K_x, 0, x_LW - K_x*X_L; 0, -K_y, y_HW + K_y*Y_L; 0, 0, 1]
M_W := T_SW*M_S
# Матрица пересчета из МСК в ОСК
x_w := transpose(M_W)[:, 0]
y_w := transpose(M_W)[:, 1]
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# Левый верхний угол
# Правый нижний угол
# Левый верхний угол в МСК
# Правый нижний угол в МСК
# Ширина области отображения в ОСК
# Ширина области отображения в МСК
# Высота области отображения в ОСК
# Высота области отображения в МСК
T_SW := [K_x, 0, x_LW - K_x*X_L; 0, -K_y, y_HW + K_y*Y_L; 0, 0, 1]
# Матрица пересчета из МСК в ОСК
