f(x) := x^3
Δx := 0.25
x_1 := -5
x_2 := 5
x_LW := 100
y_LW := 200  # Левый верхний угол
x_HW := 800
y_HW := 900  # Правый нижний угол
n := round((x_2 - x_1)/Δx)
n = 40
i := 0 .. n
x[i] := x_1 + i*Δx
.
z[i] := 1
y[i] := f(x[i])
X_L := min(x)
Y_H := max(y)  # Левый верхний угол в МСК
X_L = -5
Y_H = 125  # Правый нижний угол в МСК
X_H := max(x)
Y_L := min(y)
X_H = 5
Y_L = -125
M_S := stack(transpose(x), transpose(y), transpose(z))
Δx_w := x_HW - x_LW
Δx_w = 700  # Ширина области отображения в ОСК
ΔX := X_H - X_L
ΔX = 10  # Ширина области отображения в МСК
Δy_w := y_HW - y_LW
Δy_w = 700
ΔY := Y_H - Y_L
ΔY = 250  # Высота области отображения в ОСК
# Высота области отображения в МСК
K_x := Δx_w/ΔX
K_x = 70
K_y := Δy_w/ΔY
K_y = 2.8
T_SW := [K_x, 0, x_LW - K_x*X_L; 0, -K_y, y_HW + K_y*Y_L; 0, 0, 1]
M_W := T_SW*M_S
x_w := transpose(M_W)[:, 0]  # Матрица пересчета из МСК в ОСК
y_w := transpose(M_W)[:, 1]
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