X0 := 6
X1 := 6
X2 := 8
X3 := X0
Y0 := 6
Y1 := 8
Y2 := 6
Y3 := Y0
P := [X0, X1, X2; Y0, Y1, Y2; 1, 1, 1]
X := transpose([6, 6, 8, 6])
Y := transpose([6, 8, 6, 6])
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# Cмещение начала системы координат
Ts(dx, dy) := [1, 0, -dx; 0, 1, -dy; 0, 0, 1]
# Поворот системы координат на угол ϕ
Rs(ϕ) := [cos(ϕ), sin(ϕ), 0; -sin(ϕ), cos(ϕ), 0; 0, 0, 1]
ϕ := 90
ϕ_rad := ϕ*π/180
Δx := 2
Δy := 3
P1 := Ts(X0, Y0)*P
# 1 Смещаем систему координат в т.А
P1 = [0, 0, 2; 0, 2, 0; 1, 1, 1]
X1 := transpose(P1)[:, 0]
Y1 := transpose(P1)[:, 1]
X1[3] := X1[0]
transpose(X1) = [0, 0, 2, 0]
Y1[3] := Y1[0]
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transpose(Y1) = [0, 2, 0, 0]
# 2. Поворачиваем треугольник на угол 90 град. по часовой стрелке- это эквивалентно повороту
# СК против часовой стрелки (в полож. направлении)
P2 := Rs(ϕ_rad)*P1
X2 := transpose(P2)[:, 0]
Y2 := transpose(P2)[:, 1]
X2[3] := X2[0]
transpose(X2) = [0, 2, 0, 0]
transpose(Y2) = [0, 0, -2]
Y2[3] := Y2[0]
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P2 = [0, 2, 0; 0, 0, -2; 1, 1, 1]
# 3 Смещаем треугольник на (Δx, Δy), что эквивалентно смещению СК на (-Δx, -Δy)
P3 := Ts(-Δx, -Δy)*P2
P3 = [2, 4, 2; 3, 3, 1; 1, 1, 1]
X3 := transpose(P3)[:, 0]
transpose(X3) = [2, 4, 2]
Y3 := transpose(P3)[:, 1]
transpose(Y3) = [3, 3, 1]
X3[3] := X3[0]
Y3[3] := Y3[0]
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# 4 Смещаем систему координат в исходное положение
P4 := Ts(-X0, -Y0)*P3
P4 = [8, 10, 8; 9, 9, 7; 1, 1, 1]
X4 := transpose(P4)[:, 0]
Y4 := transpose(P4)[:, 1]
X4[3] := X4[0]
transpose(X4) = [8, 10, 8, 8]
Y4[3] := Y4[0]
transpose(Y4) = [9, 9, 7, 9]
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