f(x, y) := x^2 + y^2
xx := 0.4
x1 := -5
x2 := 5
Nx := (x2 - x1)/xx
Nx = 25
y1 := -5
y2 := 5
yy := 0.4
Ny := (y2 - y1)/yy
Ny = 25
i := 0 .. Nx
x[i] := x1 + i*xx
j := 0 .. Ny
y[j] := y1 + j*yy
M[i, j] := f(x[i], y[j])
# [component: inputs M]
f(x, y) := x^2 - y^2
xx := 0.4
x1 := -5
x2 := 5
Nx := (x2 - x1)/xx
Nx = 25
y1 := -5
y2 := 5
yy := 0.4
Ny := (y2 - y1)/yy
Ny = 25
i := 0 .. Nx
x[i] := x1 + i*xx
j := 0 .. Ny
y[j] := y1 + j*yy
M[i, j] := f(x[i], y[j])
# [component: inputs M]
f(x, y) := 10*sin(sqrt(|1 - x^2 - y^2|))/sqrt(|1 - x^2 - y^2|)
x1 := -5
x2 := 5
xx := 0.4
Nx := (x2 - x1)/xx
Nx = 25
y1 := -5
y2 := 5
yy := 0.4
Ny := (y2 - y1)/yy
Ny = 25
i := 0 .. Nx
x[i] := x1 + i*xx
j := 0 .. Ny
y[j] := y1 + j*yy
M[i, j] := f(x[i], y[j])
# [component: inputs M]
