Y := [-4; 0; 0; 4; 0; 0; -4; -4]
X := [-2; -2; -3; 0; 3; 2; 2; -2]
XLW := 100
YLW := 200  # Левый верхний угол
XHW := 400
YHW := 500  # Правый нижний угол
XL := min(X) = -3  # Левый верхний угол в МСК
YH := max(Y) = 4
XH := max(X) = 3  # Правый нижний угол в МСК
YL := min(Y) = -4
ΔXW := XHW - XLW = 300  # Ширина области отображения в ОСК
ΔX := XH - XL = 6  # Ширина области отображения в МСК
ΔYW := YHW - YLW = 300  # Высота области отображения в ОСК
ΔY := YH - YL = 8  # Высота области отображения в МСК
KX := ΔXW/ΔX = 50
X[0] = -2
KY := ΔYW/ΔY = 37.5
TSW := [KX, 0, XLW - KX*XL; 0, -KY, YHW + KY*YL; 0, 0, 1] = [50, 0, 250; 0, -37.5, 350; 0, 0, 1]  # Матрица пересчета из МСК в ОСК
# Координаты вершин в ОСК
fun(x) :=
    for i ∈ 0 .. 7
        N[i] ← TSW*[X[i]; Y[i]; 1]
    return N
Z := fun(1) = [
    [150; 500; 1]; [150; 350; 1]; [100; 350; 1]; [250; 200; 1]; [400; 350; 1]; [350; 350; 1]; [350; 500; 1]; [150; 500; 1]
]
Z[0] = [150; 500; 1]
Z[1] = [150; 350; 1]
Z[2] = [100; 350; 1]
Z[3] = [250; 200; 1]
Z[4] = [400; 350; 1]
Z[5] = [350; 350; 1]
Z[6] = [350; 500; 1]
Z[7] = [150; 500; 1]
fun_x0_y1(n) :=
    for i ∈ 0 .. 7
        U[i] ← Z[i][n]
    return U
Window_X := fun_x0_y1(0) = [150; 150; 100; 250; 400; 350; 350; 150]
Window_Y := fun_x0_y1(1) = [500; 350; 350; 200; 350; 350; 500; 500]
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# В мировой системе координат
# В оконной системе координат
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