f(x) := sin(π*x)*sqrt(|x|)
Δx := 0.1
x_1 := -6
x_2 := 6
x_LW := 100
y_LW := 200  # Левый верхний угол
x_HW := 800
y_HW := 900  # Правый нижний угол
n := round((x_2 - x_1)/Δx)
n = 120
i := 0 .. n
x[i] := x_1 + i*Δx
z[i] := 1
y[i] := f(x[i])
X_L := min(x)
Y_H := max(y)  # Левый верхний угол в МСК
X_L = -6
Y_H = 2.34521
X_H := max(x)
Y_L := min(y)  # Правый нижний угол в МСК
X_H = 6
Y_L = -2.34521
M_S := stack(transpose(x), transpose(y), transpose(z))
Δx_w := x_HW - x_LW
Δx_w = 700  # Ширина области отображения в ОСК
ΔX := X_H - X_L
ΔX = 12  # Ширина области отображения в МСК
Δy_w := y_HW - y_LW
Δy_w = 700  # Высота области отображения в ОСК
ΔY := Y_H - Y_L
ΔY = 4.69042
# Высота области отображения в МСК
K_x := Δx_w/ΔX
K_x = 58.3333
K_y := Δy_w/ΔY
K_y = 149.241
T_SW := [K_x, 0, x_LW - K_x*X_L; 0, -K_y, y_HW + K_y*Y_L; 0, 0, 1]
M_W := T_SW*M_S
x_w := transpose(M_W)[:, 0]  # Матрица пересчета из МСК в ОСК
y_w := transpose(M_W)[:, 1]
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