# Координаты оснований
A := transpose([7, 0, 0, 1])
B := transpose([0, 0, 0, 1])
C := transpose([0, 7, 0, 1])
A1 := transpose([3, 0, 7, 1])
B1 := transpose([0, 0, 7, 1])
C1 := transpose([0, 3, 7, 1])
Положение  камеры
r_grad := 10
ϕ_grad := 315
ϕ_rad := ϕ_grad/180*π
θ_grad := 45
θ_rad := θ_grad/180*π
Область отображения пирамиды в окне Windows
X_LW := 200
Y_LW := 100  # Левый верхний угол
X_HW := 700
Y_HW := 500  # Правый нижний угол
PYR := augment(A, B, C, B1, A1, C1)
PYR = [7, 0, 0, 0, 3, 0; 0, 0, 7, 0, 0, 3; 0, 0, 0, 7, 7, 7; 1, 1, 1, 1, 1, 1]
M := [
    -sin(ϕ_rad), cos(ϕ_rad), 0, 0;
    -cos(θ_rad)*cos(ϕ_rad), -cos(θ_rad)*sin(ϕ_rad), sin(θ_rad), 0;
    -sin(θ_rad)*cos(ϕ_rad), -sin(θ_rad)*sin(ϕ_rad), -cos(θ_rad), r_grad;
    0, 0, 0, 1
]  # Матрица пересчёта
V := M*PYR
V = [
    4.94975, 0, 4.94975, 0, 2.12132, 2.12132;
    -3.5, 0, 3.5, 4.94975, 3.44975, 6.44975;
    6.5, 10, 13.5, 5.05025, 3.55025, 6.55025;
    1, 1, 1, 1, 1, 1
]  # Вершина пирамиды
# Координаты проекции вершин пирамиды на картинную плоскость (видовая система координат)
X_V := transpose(V)[:, 0]
Y_V := transpose(V)[:, 1]
Z_V := transpose(V)[:, 3]
P_XY := stack(transpose(X_V), transpose(Y_V), transpose(Z_V))
P_XY = [
    4.94975, 0, 4.94975, 0, 2.12132, 2.12132;
    -3.5, 0, 3.5, 4.94975, 3.44975, 6.44975;
    1, 1, 1, 1, 1, 1
]  # Матрица из координат проекций вершин
X_L := min(X_V)
Y_H := max(Y_V)  # Левый верхний угол
X_L = 0
Y_H = 6.44975
X_H := max(X_V)
Y_L := min(Y_V)  # Правый нижний угол
X_H = 4.94975
Y_L = -3.5
ΔX_W := X_HW - X_LW
ΔX_W = 500  # Ширина обсласти отображения в оконных
ΔX := X_H - X_L
ΔX = 4.94975  # Ширина области отображения в мировых
ΔY_W := Y_HW - Y_LW
ΔY_W = 400  # Высота области отображения в оконных
ΔY := Y_L - Y_H
ΔY = -9.94975  # Высота области отображения в мировых
K_X := ΔX_W/ΔX
K_X = 101.015
K_Y := ΔY_W/ΔY
K_Y = -40.202
T_SW := [K_X, 0, X_LW - K_X*X_L; 0, -K_Y, Y_HW + K_Y*Y_H; 0, 0, 1]  # Матрица пересчёта из видовой СК в оконную СК
T_SW = [101.015, 0, 200; 0, 40.202, 240.707; 0, 0, 1]
TRX := T_SW*P_XY
TRW := vectorize(round(TRX))  # Округление до целых
TRW = [700, 200, 700, 200, 414, 414; 100, 241, 381, 440, 379, 500; 1, 1, 1, 1, 1, 1]  # Оконные координаты вершин
[x_a, x_b, x_c, x_d, x_e, x_f; y_a, y_b, y_c, y_d, y_e, y_f; q_a, q_b, q_c, q_d, q_e, q_f] := TRW
X := transpose([x_a, x_b, x_c, x_a, x_e, x_d, x_b, x_d, x_f, x_e, x_f, x_c])  # Порядок обхода вершин при рисовании
Y := transpose([y_a, y_b, y_c, y_a, y_e, y_d, y_b, y_d, y_f, y_e, y_f, y_c])
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# Направление проектирования
(декартовы*координаты*камеры)
R_C := [r_grad*(sin(θ_rad)*cos(ϕ_rad)); r_grad*(sin(θ_rad)*sin(ϕ_rad)); r_grad*cos(θ_rad)]
R_C = [5; -5; 7.07107]  # Точка наблюдения в мировой СК
# Вектор нормали к грани
AC := [C[0]; C[1]; C[2]] - [A[0]; A[1]; A[2]]
AB := [B[0]; B[1]; B[2]] - [A[0]; A[1]; A[2]]
N_ABC := AB×AC
AA1 := [A1[0]; A1[1]; A1[2]] - [A[0]; A[1]; A[2]]
A1B1 := [B1[0]; B1[1]; B1[2]] - [A1[0]; A1[1]; A1[2]]
N_AA1C1C := AC×AA1
N_ABB1A1 := AA1×AB
B1C1 := [C1[0]; C1[1]; C1[2]] - [B1[0]; B1[1]; B1[2]]
B1B := [B[0]; B[1]; B[2]] - [B1[0]; B1[1]; B1[2]]
N_A1B1C1 := B1C1×A1B1
N_B1C1CB := B1C1×B1B
p(q) :=
    "Видна" if q ≥ 0
    "Не видна" if q < 0
q1 := R_C*N_ABC
q1 = -346.482
p(q1) = "Не видна"
q2 := R_C*N_A1B1C1
q2 = 63.6396
p(q2) = "Видна"
q3 := R_C*N_AA1C1C
q3 = 197.99
p(q3) = "Видна"
q4 := R_C*N_ABB1A1
q4 = 245
p(q4) = "Видна"
q5 := R_C*N_B1C1CB
q5 = -105
p(q5) = "Не видна"
X := transpose([x_a, x_c, x_f, x_e, x_a, x_b, x_d, x_e, x_f, x_d])
Y := transpose([y_a, y_c, y_f, y_e, y_a, y_b, y_d, y_e, y_f, y_d])
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N := transpose([0, sin(ϕ_rad), cos(ϕ_rad)])  # Вектор нормали к секущей плоскости
N = [0; -0.707107; 0.707107]
[A; B; C] := N
[A; B; C] = [0; -0.707107; 0.707107]  # Параметры уравнения секущей плоскости
x_0 := 0
y_0 := 0  # Кординаты точки пересечения оси Z и секущей плоскости
z_0 := 3/4*PYR[:, 3][2]
z_0 = 5.25
D := -(A*x_0 + B*y_0 + C*z_0)  # Уравнение плоскости
D = -3.71231
# Точка пересечения Р1 с ребром АА1
[x2; y2; z2] := submatrix(PYR, 0, 2, 4, 4)
[x1; y1; z1] := submatrix(PYR, 0, 2, 0, 0)
Δx := x2 - x1
Δy := y2 - y1
Δz := z2 - z1
t_AA1 := -((A*x1 + B*y1 + C*z1 + D)/(A*Δx + B*Δy + C*Δz))
z_AA1 := z1 + Δz*t_AA1
x_AA1 := x1 + Δx*t_AA1
y_AA1 := y1 + Δy*t_AA1
y_AA1 = 0
z_AA1 = 5.25
x_AA1 = 4
# Точка пересечения Р2 с ребром CC1
[x2; y2; z2] := submatrix(PYR, 0, 2, 5, 5)
[x1; y1; z1] := submatrix(PYR, 0, 2, 2, 2)
Δx := x2 - x1
Δy := y2 - y1
Δz := z2 - z1
t_CC1 := -((A*x1 + B*y1 + C*z1 + D)/(A*Δx + B*Δy + C*Δz))
z_CC1 := z1 + Δz*t_AA1
x_CC1 := x1 + Δx*t_AA1
y_CC1 := y1 + Δy*t_AA1
y_CC1 = 4
z_CC1 = 5.25
x_CC1 = 0
# Точка пересечения Р3 с ребром BB1
[x2; y2; z2] := submatrix(PYR, 0, 2, 3, 3)
[x1; y1; z1] := submatrix(PYR, 0, 2, 1, 1)
x_BB1 := x1 - (x2 - x1)*(z1 - z_0)/(z2 - z1)
y_BB1 := y1 - (y2 - y1)*(z1 - z_0)/(z2 - z1)
y_BB1 = 0
x_BB1 = 0
z_BB1 := z_0
z_BB1 = 5.25
TR := [x_AA1, x_BB1, x_CC1; y_AA1, y_BB1, y_CC1; z_AA1, z_BB1, z_CC1; 1, 1, 1]  # Матрица мировых коорднат точек P1, P2, P3
# Область отображения графика в окне
X_WL := 100
Y_WL := 200  # Левый верхний угол области отображения
X_WH := 800
Y_WH := 900  # Правый нижний угол области отображения
M_v := [
    -sin(ϕ_rad), cos(ϕ_rad), 0, 0;
    -cos(θ_rad)*cos(ϕ_rad), -cos(θ_rad)*sin(ϕ_rad), sin(θ_rad), 0;
    -sin(θ_rad)*cos(ϕ_rad), -sin(θ_rad)*sin(ϕ_rad), -cos(θ_rad), r_grad;
    0, 0, 0, 1
]
# Координаты вершин пирамиды в видовой СК
PIR_V := M_v*PYR
# Координаты вершин треугольника сечения Р1, Р2, Р3 в видовой СК
TR_V := M_v*TR
# Координаты проекции вершин пирамиды на картиннную плоскость
P_XY := stack(transpose(transpose(V)[:, 0]), transpose(transpose(V)[:, 1]), transpose(transpose(V)[:, 3])) = [
    4.94975, 0, 4.94975, 0, 2.12132, 2.12132;
    -3.5, 0, 3.5, 4.94975, 3.44975, 6.44975;
    1, 1, 1, 1, 1, 1
]
# Координаты проекции вершин треугольника сечения Р1,
# Р2, Р3 на картинную плоскость
TR_XY := stack(transpose(transpose(TR_V)[:, 0]), transpose(transpose(TR_V)[:, 1]), transpose(transpose(TR_V)[:, 3])) = [2.82843, 0, 2.82843; 1.71231, 3.71231, 5.71231; 1, 1, 1]
# Габаритная область проекции пирамиды на плоскость ВСК -картинная плоскость
y_H := max(transpose(P_XY)[:, 1])  # Левый верхний угол
x_L := min(transpose(P_XY)[:, 0])
x_L = 0
y_H = 6.44975
y_L := min(transpose(P_XY)[:, 1])  # Правый нижний угол
x_H := max(transpose(P_XY)[:, 0])
y_L = -3.5
x_H = 4.94975
# Параметры для формирования матрицы пересчёта координат в оконные
ΔX_W := X_WH - X_WL
ΔX_W = 700
ΔX := X_H - X_L
ΔX = 4.94975
ΔY_W := Y_WH - Y_WL
ΔY_W = 700
ΔY := Y_H - Y_L
ΔY = 9.94975
K_x := ΔX_W/ΔX
K_y := ΔY_W/ΔY
K_x = 141.421
K_y = 70.3535
# Mатрица пересчета из ВСК в ОК
T_SW := [K_x, 0, X_WL - K_x*X_L; 0, -K_y, Y_WH + K_y*Y_L; 0, 0, 1] = [141.421, 0, 100; 0, -70.3535, 653.763; 0, 0, 1]
M_W := T_SW*P_XY = [800, 100, 800, 100, 400, 400; 900, 653.763, 407.525, 305.53, 411.061, 200; 1, 1, 1, 1, 1, 1]
# Оконные координаты вершины пирамиды
[A_X, B_X, C_X, A2_X, B2_X, C2_X; A_Y, B_Y, C_Y, A2_Y, B2_Y, C2_Y; q, q, q, q, q, q] := vectorize(round(M_W)) = [800, 100, 800, 100, 400, 400; 900, 654, 408, 306, 411, 200; 1, 1, 1, 1, 1, 1]
X := transpose([A_X, C_X, B_X, A2_X, B2_X, A_X, B_X, A2_X, C2_X, B2_X, A_X, C_X, C2_X])
Y := -transpose([A_Y, C_Y, B_Y, A2_Y, B2_Y, A_Y, B_Y, A2_Y, C2_Y, B2_Y, A_Y, C_Y, C2_Y])
TR_W := T_SW*TR_XY
# Оконные координаты вершин
# треугольника сечения Р1, Р2, Р3
[X_P1, X_P3, X_P2; Y_P1, Y_P3, Y_P2; q, q, q] := vectorize(round(TR_W)) = [500, 100, 500; 533, 393, 252; 1, 1, 1]
XC := transpose([X_P1, X_P2, X_P3, X_P1])
# Массивы координат Х и У для рисования
# сечения пирамиды
YC := -transpose([Y_P1, Y_P2, Y_P3, Y_P1])
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