X1 := [2; 5]
Y1 := [12; 9]
X2 := [2; 5]
Y2 := [3; 6]
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x := 0
y := 0
Given
y + x - 14 == 0  # Уравнение прямой AB
y - x - 1 == 0  # Уравнение прямой CD
Find(x, y) = [6.5; 7.5]  # Точка пересечения
P := [6.5; 7.5; 1]
# Углы наклона
Px := P[0]
TA := [1, 0, P[0]; 0, 1, P[1]; 0, 0, 1]*[cos(π), sin(π), 0; -sin(π), cos(π), 0; 0, 0, 1]*[1, 0, -P[0]; 0, 1, -P[1]; 0, 0, 1] = [-1, 0, 13; 0, -1, 15; 0, 0, 1]
fun(x) :=
    for i ∈ 0 .. 1
        N[i] ← TA*[X1[i]; Y1[i]; 1]
    return N
fun1(x) :=
    for i ∈ 0 .. 1
        N[i] ← TA*[X2[i]; Y2[i]; 1]
    return N
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Z := fun(1) = [[11; 3; 1]; [8; 6; 1]]
D := fun1(1) = [[11; 12; 1]; [8; 9; 1]]
D[1] = [8; 9; 1]
Z[0] = [11; 3; 1]
D[0] = [11; 12; 1]
Z[1] = [8; 6; 1]
X3 := [11; 8]
Y3 := [3; 6]
X4 := [11; 8]
Y4 := [12; 9]
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