Ax := 2
Ay := 12
Bx := 5
By := 9
Cx := 2
Cy := 3
Dx := 5
Dy := 6
ABx := transpose([Ax, Bx])
ABy := transpose([Ay, By])
CDx := transpose([Cx, Dx])
CDy := transpose([Cy, Dy])
A := transpose([Ax, Ay, 1])
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B := transpose([Bx, By, 1])
C := transpose([Cx, Cy, 1])
D := transpose([Dx, Dy, 1])
Δ := det([Bx - Ax, -(Dx - Cx); By - Ay, -(Dy - Cy)]) = -18
t := 0
s := 0
Given
(Bx - Ax)*t - (Dx - Cx)*s == Cx - Ax
(By - Ay)*t - (Dy - Cy)*s == Cy - Ay
[t0; s0] := Find(t, s) = [1.5; 1.5]
P := A + (B - A)*t0 = [6.5; 7.5; 1]
# Точка пересечения
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Преобразования
ϕ := π
# Сдвиг центра координат к т. P
S1 := [1, 0, -P[0]; 0, 1, -P[1]; 0, 0, 1]  # Угол поворота
# Поворот вокруг центра координат
Arc := [cos(ϕ), sin(ϕ), 0; -sin(ϕ), cos(ϕ), 0; 0, 0, 1]
# Возвращение к изначальным координатам
S2 := [1, 0, P[0]; 0, 1, P[1]; 0, 0, 1]
# Комбинация преобразований
Ar := S2*Arc*S1
nA := Ar*A
nB := Ar*B  # Новые координаты точек
nC := Ar*C
nD := Ar*D
nABx := transpose([nA[0], nB[0]])
nABy := transpose([nA[1], nB[1]])
nCDx := transpose([nC[0], nD[0]])
nCDy := transpose([nC[1], nD[1]])
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