A := [5; 0; 0; 1]
B := [0; 0; 10; 1]
C := [0; 0; 0; 1]
D := [0; 20; 0; 1]
E := [0; 10; 0; 1]
PYR := augment(A, B, C, D)
PYR = [5, 0, 0, 0; 0, 0, 0, 20; 0, 10, 0, 0; 1, 1, 1, 1]
N := [0; 1; 0]
W := -(N[0]*E[0] + N[1]*E[1] + N[2]*E[2]) = -10
# E1 and AD
[x1; y1; z1] := submatrix(PYR, 0, 2, 0, 0)
[x2; y2; z2] := submatrix(PYR, 0, 2, 3, 3)
[dx; dy; dz] := [x2 - x1; y2 - y1; z2 - z1] = [-5; 20; 0]
EAD := -(N[0]*x1 + N[1]*y1 + N[2]*z1 + W)/(N[0]*dx + N[1]*dy + N[2]*dz) = 0.5
XAD := x1 + dx*EAD = 2.5
YAD := y1 + dy*EAD = 10
ZAD := z1 + dz*EAD = 0
# E1 and BD
[x1; y1; z1] := submatrix(PYR, 0, 2, 1, 1)
[x2; y2; z2] := submatrix(PYR, 0, 2, 3, 3)
[dx; dy; dz] := [x2 - x1; y2 - y1; z2 - z1] = [0; 20; -10]
EBD := -(N[0]*x1 + N[1]*y1 + N[2]*z1 + W)/(N[0]*dx + N[1]*dy + N[2]*dz) = 0.5
XBD := x1 + dx*EBD = 0
YBD := y1 + dy*EBD = 10
ZBD := z1 + dz*EBD = 5
# E1 and CD
[x1; y1; z1] := submatrix(PYR, 0, 2, 2, 2)
[x2; y2; z2] := submatrix(PYR, 0, 2, 3, 3)
[dx; dy; dz] := [x2 - x1; y2 - y1; z2 - z1] = [0; 20; 0]
ECD := -(N[0]*x1 + N[1]*y1 + N[2]*z1 + W)/(N[0]*dx + N[1]*dy + N[2]*dz) = 0.5
XCD := x1 + dx*ECD = 0
YCD := y1 + dy*ECD = 10
ZBD := z1 + dz*ECD = 0
