# В мировой системе координат (МСК) заданы:
# координаты отрезка прямой AB:
# A(4 2), B(16 3)
# координаты точки C:
# C(Xc Yc) = C(Xc 8)
# Значение Xc выбирается таким образом, что AC=BC.
# Отрезок AB поворачивается вокруг точки С на угол 90 градусов против часовой стрелки.
# Отобразить взаимное положение отрезка AB и точки C в МСК до и после поворота.
ORIGIN := 1  # Приравниваем отрезки AC И BC
A := [4; 2]
B := [16; 3]
C(x) := [x; 8]
|C(x) - A| == |C(x) - B| solve, x → 229/24
C := C(229/24) → [229/24; 8]  # Проверка
|A - C| = 8.16762
|B - C| = 8.16762  # Правильно!
# Поворот точек A и B вокруг C
φ := π/2
M := [cos(φ), -sin(φ); sin(φ), cos(φ)]
MA := C + M*(A - C)
MB := C + M*(B - C)
AB := transpose(augment(A, B))
MAB := transpose(augment(MA, MB))
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# (づ｡◕‿‿◕｡)づ ᐧᐄᓂᔥᒄ
