# Координаты вершин пирамиды в МСК
A := transpose([2, 0, 0, 1])
D := transpose([0, 0, 3, 1])
B := transpose([0, 0, 0, 1])
C := transpose([0, 5, 0, 1])
# Положение камеры в МСК
r := 1
φ := 45
θ := 30
φ := π*φ/180 = 0.785398
θ := π*θ/180 = 0.523599
MatrixCoordCamera := [r*sin(θ)*cos(φ); r*sin(θ)*sin(φ); r*cos(θ)] = [0.353553; 0.353553; 0.866025]
# Нахождение векторов нормали-------------------------------------------------------------------------------------
# Грань BAD
AB := [B[0]; B[1]; B[2]] - [A[0]; A[1]; A[2]] = [-2; 0; 0]
AD := [D[0]; D[1]; D[2]] - [A[0]; A[1]; A[2]] = [-2; 0; 3]
N[1] := AB×AD = [0; 6; 0]  # -Вектор нормали к грани BAD
# Грань DAC
AD := [D[0]; D[1]; D[2]] - [A[0]; A[1]; A[2]] = [-2; 0; 3]
AC := [C[0]; C[1]; C[2]] - [A[0]; A[1]; A[2]] = [-2; 5; 0]
N[2] := AD×AC = [-15; -6; -10]  # -Вектор нормали к грани DAC
# Грань DCB
CD := [D[0]; D[1]; D[2]] - [C[0]; C[1]; C[2]] = [0; -5; 3]
CB := [B[0]; B[1]; B[2]] - [C[0]; C[1]; C[2]] = [0; -5; 0]
N[3] := CD×CB = [15; 0; 0]  # -Вектор нормали к грани DCB
# Грань ABC
BA := [A[0]; A[1]; A[2]] - [B[0]; B[1]; B[2]] = [2; 0; 0]
BC := [C[0]; C[1]; C[2]] - [B[0]; B[1]; B[2]] = [0; 5; 0]
N[5] := BA×BC = [0; 0; 10]  # -Вектор нормали к грани ABC
# --------------------------------------------------------------------------------------------------------------------------------------
# Определяем видимость грани BAD
q1 := MatrixCoordCamera*N[1] = 2.12132
s1 := if(q1 ≥ 0, "Грань видна", "Грань не видна")
s1 = "Грань видна"
# Определяем видимость грани DAC
q2 := MatrixCoordCamera*N[2] = -16.0849
s2 := if(q2 ≥ 0, "Грань видна", "Грань не видна")
s2 = "Грань не видна"
# Определяем видимость грани DCB
q3 := MatrixCoordCamera*N[3] = 5.3033
s3 := if(q3 ≥ 0, "Грань видна", "Грань не видна")
s3 = "Грань видна"
# Определяем видимость грани ABC
q5 := MatrixCoordCamera*N[5] = 8.66025
s5 := if(q5 ≥ 0, "Грань видна", "Грань не видна")
s5 = "Грань видна"
# ---------------------------------------------------------------------------------------------------------------------------------------------
