# В мировой системе координат (МСК) заданы:
# координаты отрезка прямой AB:
# A(5 2), B(15 3)
# координаты точки C:
# C(Xc Yc) = C(Xc 8)
# Значение Xc выбирается таким образом, что AC=BC.
# Отрезок AB поворачивается вокруг точки С на угол 90 градусов против часовой стрелки.
# Отобразить взаимное положение отрезка AB и точки C в МСК до и после поворота.
ORIGIN := 1  # Приравниваем отрезки AC И BC
A := [5; 2]
B := [15; 3]
C(x) := [x; 8]
|C(x) - A| == |C(x) - B| solve, x → 189/20
C := C(189/20) → [189/20; 8]  # Проверка
|A - C| = 7.47011
|B - C| = 7.47011  # Правильно!
# Поворот точек A и B вокруг C
φ := π/2
M := [cos(φ), -sin(φ); sin(φ), cos(φ)]
MA := C + M*(A - C)
MB := C + M*(B - C)
AB := transpose(augment(A, B))
MAB := transpose(augment(MA, MB))
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# (づ｡◕‿‿◕｡)づ ᐧᐄᓂᔥᒄ
