ORIGIN := 1  # Матрица поворота
A := [5; 8]
B := [9; 15]
C := [13; 7]
φ := π/2
M := [cos(φ), sin(φ); -sin(φ), cos(φ)]
# Векторы сторон АВ и АС
AB := B - A
AC := C - A
# Уравнения высот к AB и AC
h_C(t) := C + M*AB*t
h_B(u) := B + M*AC*u
# Точка пересечения высот
Given
h_C(t) == h_B(u)
[t; u] := Find(t, u) → [-2/3; 2/3]
H := h_C(t) → [25/3; 29/3]
H := h_B(u) → [25/3; 29/3]
# Исходный треугольник
ABC := transpose(augment(A, B, C, A))
# Поворот вокруг точки H
A_1 := H + M*(A - H) → [20/3; 13]
B_1 := H + M*(B - H) → [41/3; 9]
C_1 := H + M*(C - H) → [17/3; 5]
# Повернутный треугольник
MABC := transpose(augment(A_1, B_1, C_1, A_1))
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