A := [6; 7]
B := [10; 14]
C := [14; 6]
D := [12; 10]
E := [6; 4]
AC := C - A
ED := D - E
ABC := transpose(augment(A, B, C, A))
DE := transpose(augment(D, E))
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(B + C)/2 = [12; 10]  # точка D лежит на середине BC
# Найдем пересечение AC и DE
# Уравнение прямой AC
LAC(t) := A + AC*t
# Уравнение прямой DE
LED(u) := E + ED*u
# Решаем уравнение для точки пересечения AC и DE
Given
LAC(t) == LED(u)
[t; u] := Find(t, u) → [1/3; 4/9]
# В итоге координаты точек пересечения  AC и DE
LAC(t) → [26/3; 20/3]
LED(u) → [26/3; 20/3]
