# Задача №8
A := [5; 0; 0]
B := [0; 0; 10]
C := [0; 0; 0]
D := [0; 10; 0]
r := 1
phi := 60*π/180
zen := 30*π/180
I0 := 10
R := [r*sin(zen)*cos(phi); r*sin(zen)*sin(phi); r*cos(zen)] = [0.25; 0.433013; 0.866025]
AB := [B[0] - A[0]; B[1] - A[1]; B[2] - A[2]] = [-5; 0; 10]
AC := [C[0] - A[0]; C[1] - A[1]; C[2] - A[2]] = [-5; 0; 0]
CA := -AC = [5; 0; 0]
BD := [D[0] - B[0]; D[1] - B[1]; D[2] - B[2]] = [0; 10; -10]
DB := -BD = [0; -10; 10]
CD := [D[0] - C[0]; D[1] - C[1]; D[2] - C[2]] = [0; 10; 0]
DC := -CD = [0; -10; 0]
NABC := CA×AB = [0; -50; 0]
NBDC := BD×DC = [-100; 0; 0]
NABD := BD×AB = [100; 50; 50]
NACD := AC×CD = [0; 0; -50]
R*NABC = -21.6506
R*NABD = 89.9519
R*NBDC = -25
R*NACD = -43.3013
COSrNabd := R*NABD/(|R|*|NABD|) = 0.734454
Id := I0*COSrNabd*COSrNabd = 5.39423
