A := [6; 7]
B := [10; 16]
C := [14; 5]
D := [5; 3]
E := [8; 12]
AB := B - A
ED := D - E
ABC := transpose(augment(A, B, C, A))
DE := transpose(augment(D, E))
AC := C - A
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# Найдем пересечение AB и DE
# Уравнение прямой AB
LAB(t) := A + AB*t
# Уравнение прямой DE
LED(u) := E + ED*u
# Решаем уравнение для точки пересечения AB и DE
Given
LAB(t) == LED(u)
[t; u] := Find(t, u) → [1/3; 2/9]
# В итоге координаты точек пересечения  AB и DE
LAB(t) → [22/3; 10]
LED(u) → [22/3; 10]
# Найдем пересечение AC и DE
# Уравнение прямой AC
LAC(t) := A + AC*t
# Уравнение прямой DE
LED(u) := E + ED*u
# Решаем уравнение для точки пересечения AC и DE
Given
LAC(t) == LED(u)
[t; u] := Find(t, u) → [1/26; 22/39]
# В итоге координаты точек пересечения  AC и DE
LAC(t) → [82/13; 90/13]
LED(u) → [82/13; 90/13]
