# Лабораторная работа № 11
# студента 1 курса 2 группы
# Аникеенко Егора
# Вариант 2
# 1)
z(x) :=
    h ← (x^2 + 2*x - 3 + (x + 1)*sqrt(x^2 - 9))/(x^2 - 2*x - 3 + (x - 1)*sqrt(x^2 - 9))
    return h
z(1) = -1.41421i
z(4) = 2.64575
z(2) = -2.23607i
z(5) = 2
z(3) =  # error: Деление на ноль.
z(6) = 1.73205
# 2 )
x := 0.1, 0.2 .. 1
f(x) :=
    b ← 1.5
    ans ← b*x - ln(b*x) if b*x < 1
    otherwise
        ans ← 1 if b*x == 0
        ans ← b*ln(b*x) otherwise
    return ans
f(x) :=
    b ← 1.5
    ans ← b*x - ln(b*x) if b*x < 1
    otherwise
        ans ←
            1 if b*x == 0
            b*ln(b*x) otherwise
    return ans
Эквивалентно
f(x) = [2.04712; 1.50397; 1.24851; 1.11083; 1.03768; 1.00536; 0.0731852; 0.273482; 0.450157; 0.608198]
x = [0.1; 0.2; 0.3; 0.4; 0.5; 0.6; 0.7; 0.8; 0.9; 1]
# 3)
F(start, a, step) :=
    j ← start
    i ← 0
    while j ≤ 1 + step
        F[i] ←
            sqrt(|a + j|) if j < 0.85
            ln(j) otherwise
        i ← i + 1
        j ← j + step
    return F
a + j
F(0.8, -1.17, 0.02) = [0.608276; 0.591608; 0.574456; -0.150823; -0.127833; -0.105361; -0.0833816; -0.0618754; -0.040822; -0.0202027; 0]
