# Лабораторная работа №7-8
# Студента 1 курса 2 группы
# Аникеенко Егора Вячеславовича
# Вариант 2
2.
y(x) := (e^(2*x)*nthroot(1 - 4*x^2, 3))
x := -2, -1.8 .. 2
1.
# a)
x = [-2; -1.8; -1.6; -1.4; -1.2; -1; -0.8; -0.6; -0.4; -0.2; 0; 0.2; 0.4; 0.6; 0.8; 1; 1.2; 1.4; 1.6; 1.8; 2]
y(x) = [-0.0451702; -0.0624861; -0.0855359; -0.115432; -0.152603; -0.195187; -0.234155; -0.229085; 0.319643; 0.632473; 1; 1.40759; 1.5832; -2.52525; -5.74442; -10.6569; -18.5428; -31.216; -51.4793; -83.6958; -134.651]
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4*sqrt(5 - 2*sqrt(6))/((nthroot(3, 4) + nthroot(2, 4))*(nthroot(2, 4) - nthroot(3, 4))) = -4
# б)
x := 25
n := 2
y := (sqrt(x^3 + n) + cos(|n*x - 1|))/nthroot(x^5 + 8*x + n, 4) = 2.24158
# в)
t := (sum(sin(i/n), i = 1 .. 10) + sum((i - n)/(i + n), i = 1 .. 5))/product((n + 3j)/(n^2 + n*i - n), i = 1 .. 5) = 11.748 + 57.4883i
5.
4.
a := -π/2
b := π/2
B := [4, 5, 2; -7, 1, -5; 9, 6, 3]
3.
A := [1, -10, 1; 4, 2, -2; 9, 6, 3]
V := [-4; 5; 1]
x := -5, -4.8 .. 5
y := -5, -4.8 .. 5
C := A*B = [83, 1, 55; -16, 10, -8; 21, 69, -3]
d := |A|*|B| = -29160
n := 50
f(x, y) := sin(x)/x + sin(y)/y
integral((t + 1)*cos(n*t - 2)/sqrt(sin(t)^3 + 4), t = a .. b) = 0.0268784
S := B*V = [11; 28; -3]
x = [
    -5; -4.8; -4.6; -4.4; -4.2; -4; -3.8; -3.6; -3.4; -3.2
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]
g := transpose(V)*A*V = 169
E := A^-1*C - B = [0, 0, 4.44089e-16; 0, -1.11022e-16, 0; -1.77636e-15, 0, -4.44089e-16]
y = [
    -5; -4.8; -4.6; -4.4; -4.2; -4; -3.8; -3.6; -3.4; -3.2
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]
q := max(A) = 9
p := min(B) = -7
# [component: inputs f]
