# Лабораторная работа №9
# студента 1 курса 2 группы
# Аникеенко Егора Вячеславовича
# Вариант 2
# 1)
x := -3, -2.9 .. 3
f(x) := 3*x + cos(x) + 1
z(x) := (x + 2)*sin(x + 2) - 1
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x := -1
root(f(x), x) = -0.607102  # Первый корень f(x)
x := -2
root(z(x), x) = -0.885843  # Первый корень z(x)
x := 1
root(z(x), x) = 0.772605  # Второй корень z(x)
# 2 )
f(x) := x^4 + 6*x^3 + x^2 - 4*x - 60
V := [-60; -4; 1; 6; 1]
x := polyroots(V) = [-6; -1 - 2i; -1 + 2i; 2]
# 3)
# а)
x := 1
y := 1
z := 1
p := 1
Given
x + 2*y + 3*z + 4*p == 22
2*x + 3*y + z + 2*p == 17
x + y + z - p == 8
x - 2*y - 3*p == -7
V := Find(x, y, z, p) = [1; 3.29412; 4.17647; 0.470588]
# б)
x + 2*y + 3*z + 4*p == 22
2*x + 3*y + z + 2*p == 17
x + y + z - p == 8
x - 2*y - 3*p == -7
B := [22; 17; 8; -7]
A := [1, 2, 3, 4; 2, 3, 1, 2; 1, 1, 1, -1; 1, -2, 0, -3]
X := A^-1*B = [1; 3.29412; 4.17647; 0.470588]
# в)
A := [1, 2, 3, 4; 2, 3, 1, 2; 1, 1, 1, -1; 1, -2, 0, -3]
B := [22; 17; 8; -7]
lsolve(A, B) = [1; 3.29412; 4.17647; 0.470588]
# 4)
x := 1
y := 1
Given
sin(x + 0.5) - y == 1
cos(y - 2) + x == 0
V := Minerr(x, y)
V = [0.537853; -0.138685]
